Simulations: Version=190
  Folder Replacements
    Plant Soybean: PlantType=Soybean
      OrganArbitrator Arbitrator
        BiomassTypeArbitrator DMArbitration
          Folder PotentialPartitioningMethods
            ReallocationMethod
            AllocateFixationMethod
            RetranslocationMethod
            SendPotentialDMAllocationsMethod
          Folder AllocationMethods
            NutrientConstrainedAllocationMethod
            DryMatterAllocationsMethod
          RelativeAllocation ArbitrationMethod
        BiomassTypeArbitrator NArbitration
          Folder PotentialPartitioningMethods
            ReallocationMethod
          Folder ActualPartitioningMethods
            AllocateFixationMethod
            RetranslocationMethod
          Folder AllocationMethods
            NitrogenAllocationsMethod
          RelativeAllocation ArbitrationMethod
          AllocateUptakesMethod
        WaterUptakeMethod
        NitrogenUptakeMethod
      Phenology
        Memo Introduction
          In the new model we simplified phenology by taking out stages that are not measurable (e.g. end of juvenile stage) and by adding new stages that are measurable (e.g. start pod).
          The new phenology follows the V/R staging system.

          ![Alt Text](Diagrams_soy_phenology_comparison.png)

          **Figure [FigureNumber]:** Comparison of soybean phenological stages for APSIM Classic and APSIM Next Generation.
        Memo
          The key differences for cultivars are mostly phenological parameters (e.g., Vegetative.Target, ReproductivePhotoperiodModifier). In some cases, some additional parameters have been changed, see parameter values in the cultivar section.
        SubDailyInterpolation VegetativeThermalTime: agregationMethod=0
          XYPairs Response: X=[10, 20, 30, 40]; Y=[0, 10, 20, 0]
          ThreeHourAirTemperature InterpolationMethod
        LinearInterpolationFunction VegetativePhotoperiodModifier
          XYPairs: X=[14.43, 21.19]; Y=[1, 0]
          Memo
            These parameters are overridden by cultivar parameter descriptions to capture the difference between individual cultivars in terms of their phenological development.  Responses shown here are only indicative.  See cultivar descriptions for more information.
          VariableReference XValue: VariableName=[Phenology].Photoperiod
        SubDailyInterpolation ReproductiveThermalTime: agregationMethod=0
          XYPairs Response: X=[10, 15, 30, 40]; Y=[5, 5, 20, 0]
          ThreeHourAirTemperature InterpolationMethod
          Memo
            Cardinal temperatures for vegetative and reproductive thermal time are the same except the range of 0-15° C. A base temperature of 10° C is used for vegetative phase, which temperature has been used to calibrate 56 soybean cultivars in the USA ([ARCHONTOULIS2014465]) and 72 soybean cultivars in China ([WU2019125940]). The small changes in cardinal temperatures for reproductive thermal time was important for solving issues related to photoperiod response for some Australian cultivars. Such a differentiation in base temperature between V and R stages is supported by [BootChapter1998], DSSAT-CROPGRO soybean model, who showed that cardinal temperatures may differ for vegetative and reproductive development for soybean. This is something to further explore as new data from other environments are added to the APSIM NG database.
        LinearInterpolationFunction ReproductivePhotoperiodModifier: same as Replacements.Soybean.Phenology.VegetativePhotoperiodModifier
        PhaseLookup ThermalTime
          PhaseLookupValue PreEmergence: Start=Sowing; End=Emergence
            VariableReference Base: VariableName=[Phenology].VegetativeThermalTime
          PhaseLookupValue VegetativeGrowth: Start=Emergence; End=EndCanopyDevelopment
            MultiplyFunction TT
              VariableReference Base: VariableName=[Phenology].VegetativeThermalTime
              VariableReference PPModifier: VariableName=[Phenology].VegetativePhotoperiodModifier
          PhaseLookupValue ReproductiveGrowth: Start=EndCanopyDevelopment; End=HarvestRipe
            MultiplyFunction TT
              VariableReference Base: VariableName=[Phenology].ReproductiveThermalTime
              VariableReference PPModifier: VariableName=[Phenology].ReproductivePhotoperiodModifier
        PhotoperiodFunction Photoperiod: Twilight=0; DayLength=0
        GerminatingPhase Germinating: Start=Sowing; End=Germination; IsEmerged=false
          Constant MinSoilTemperature: FixedValue=0
        EmergingPhase Emerging: Start=Germination; End=Emergence; IsEmerged=false; TTForTimeStep=0
          VariableReference ThermalTime: VariableName=[Phenology].VegetativeThermalTime
          AddFunction Target
            Constant ShootLag: FixedValue=10
            MultiplyFunction DepthxRate
              VariableReference SowingDepth: VariableName=[Plant].SowingData.Depth
              Constant ShootRate: FixedValue=1
        GenericPhase Vegetative: Start=Emergence; End=StartFlowering; IsEmerged=true
          Constant Target: FixedValue=200
          VariableReference Progression: VariableName=[Phenology].ThermalTime
        GenericPhase EarlyFlowering: Start=StartFlowering; End=StartPodDevelopment; IsEmerged=true
          Memo
            The duration of the grain filling phase has been taken from the model of Robertson et al (2002).
          Constant Target: FixedValue=200
          VariableReference Progression: VariableName=[Phenology].ThermalTime
        GenericPhase EarlyPodDevelopment: Start=StartPodDevelopment; End=StartGrainFilling; IsEmerged=true
          Memo
            The duration of the grain filling phase has been taken from the model of Robertson et al (2002).
          Constant Target: FixedValue=140
          VariableReference Progression: VariableName=[Phenology].ThermalTime
        GenericPhase EarlyGrainFilling: Start=StartGrainFilling; End=EndCanopyDevelopment; IsEmerged=true
          MultiplyFunction Target
            Constant FractionofGrainfilling: FixedValue=0.05
            VariableReference EntireGrainfilling
              VariableName=[Phenology].LateGrainFilling.Target.EntireGrainfillPeriod.FixedValue
          VariableReference Progression: VariableName=[Phenology].ThermalTime
        GenericPhase MidGrainFilling: Start=EndCanopyDevelopment; End=EndPodDevelopment; IsEmerged=true
          MultiplyFunction Target
            Constant FractionofMidToLateGrainfilling: FixedValue=0.5
            SubtractFunction MidToLateGrainfilling
              VariableReference EntireGrainfilling
                VariableName=[Phenology].LateGrainFilling.Target.EntireGrainfillPeriod.FixedValue
              VariableReference EarlyGrainfilling: VariableName=[Phenology].EarlyGrainFilling.Target
          VariableReference Progression: VariableName=[Phenology].ThermalTime
        GenericPhase LateGrainFilling: Start=EndPodDevelopment; End=EndGrainFill; IsEmerged=true
          SubtractFunction Target
            Constant EntireGrainfillPeriod: FixedValue=500
            VariableReference EarlyGrainFillingTarget: VariableName=[Phenology].EarlyGrainFilling.Target
            VariableReference MidGrainFillingTarget: VariableName=[Phenology].MidGrainFilling.Target
          VariableReference Progression: VariableName=[Phenology].ThermalTime
        GenericPhase Maturing: Start=EndGrainFill; End=Maturity; IsEmerged=true
          Constant Target: FixedValue=45
          VariableReference Progression: VariableName=[Phenology].ThermalTime
        GenericPhase Ripening: Start=Maturity; End=HarvestRipe; IsEmerged=true
          Constant Target: FixedValue=45
          VariableReference Progression: VariableName=[Phenology].ThermalTime
        EndPhase ReadyForHarvesting: Start=HarvestRipe; End=Unused; IsEmerged=true
          VariableReference ThermalTime: VariableName=[Phenology].ThermalTime
        OnEventFunction EmergenceDAS: SetEvent=Emergence; ReSetEvent=never
          Memo
            A function is used to provide emergence date as days after sowing(DAS).
          Constant PreEventValue: FixedValue=0
          VariableReference PostEventValue: VariableName=[Plant].DaysAfterSowing
        OnEventFunction FloweringDAS: SetEvent=StartFlowering; ReSetEvent=never
          Memo
            A function is used to provide flowering date as days after sowing(DAS).
          Constant PreEventValue: FixedValue=0
          VariableReference PostEventValue: VariableName=[Plant].DaysAfterSowing
        OnEventFunction MaturityDAS: SetEvent=Maturity; ReSetEvent=never
          Memo
            A function is used to provide maturity date as days after sowing(DAS).
          Constant PreEventValue: FixedValue=0
          VariableReference PostEventValue: VariableName=[Plant].DaysAfterSowing
        OnEventFunction SeedFillingDAS: SetEvent=StartGrainFilling; ReSetEvent=never
          Memo
            A function is used to provide flowering date as days after sowing(DAS).
          Constant PreEventValue: FixedValue=0
          VariableReference PostEventValue: VariableName=[Plant].DaysAfterSowing
      SimpleLeaf Leaf: Albedo=0.25; Gsmax350=0.015; R50=150; LeafInitialisationStage=Emergence; Height=0; BaseHeight=0; Width=0; FRGR=0; PotentialEP=0; WaterDemand=0; KDead=0.2; LAIDead=0
        RUEModel Photosynthesis
          Constant RUE: FixedValue=1.2
            Memo
              This value has been fitted to available data. In contrast to Classic, the RUE value in NG refers to the whole plant (above and below ground) and the calibrated value is 1.2 g/MJ. There are no literature references for whole plant RUE in soybean. To come up with this value we considered: RUE for above ground biomass ([SINCLAIR198929]; [VANROEKEL20141189]), biomass and root data from Iowa FACTS experiments and model fitting to available data.
          WeightedTemperatureFunction FT: MaximumTemperatureWeighting=0.5
            XYPairs: X=[10, 20, 30, 40]; Y=[0, 1, 1, 0]
            Memo
              The function for temperature effect on RUE comes from APSIM classic, which seems to work well across diverse environments. We did not find any comments/suggestions in the published papers suggesting alternative ones, so for now we used the same function. As more data from different environments are added to APSIM database, it will be possible to further test the photosynthetic temperature response in the future.
          LinearInterpolationFunction FVPD
            XYPairs: X=[0, 10, 50]; Y=[1, 1, 1]
            VariableReference XValue: VariableName=[Leaf].Photosynthesis.VPD
          LinearInterpolationFunction FN
            XYPairs: X=[0, 1, 1.5]; Y=[0, 1, 1]
            VariableReference XValue: VariableName=[Leaf].Fn
          LinearInterpolationFunction FW
            XYPairs: X=[0, 1]; Y=[0, 1]
            VariableReference XValue: VariableName=[Leaf].Fw
          RUECO2Function FCO2: PhotosyntheticPathway=C3
          VariableReference RadnInt: VariableName=[Leaf].RadiationIntercepted
        StomatalConductanceCO2Modifier
          VariableReference PhotosynthesisCO2Modifier: VariableName=[Leaf].Photosynthesis.FCO2
        MultiplyFunction Area
          VariableReference SLA: VariableName=[Leaf].SpecificArea
          VariableReference LeafLiveWt: VariableName=[Leaf].Live.Wt
        MinimumFunction FRGR
          VariableReference RUE_FT: VariableName=[Leaf].Photosynthesis.FT
          VariableReference RUE_FN: VariableName=[Leaf].Photosynthesis.FN
          VariableReference RUE_FVPD: VariableName=[Leaf].Photosynthesis.FVPD
        LinearInterpolationFunction ExtinctionCoefficient
          XYPairs: X=[200, 1000]; Y=[0.6, 0.4]
          VariableReference XValue: VariableName=[Soybean].SowingData.RowSpacing
        LinearInterpolationFunction HeightFunction
          XYPairs: X=[1, 2, 3, 4, 5, 6, 9]; Y=[0, 0, 50, 400, 700, 900, 1000]
          VariableReference XValue: VariableName=[Phenology].Stage
        AddFunction NodeNumber
          Constant Initial: FixedValue=0
          AccumulateFunction Change: StartStageName=Emergence; EndStageName=EndCanopyDevelopment; FractionRemovedOnCut=1; FractionRemovedOnHarvest=1; FractionRemovedOnGraze=1; FractionRemovedOnPrune=0
            DivideFunction DeltaNode
              VariableReference ThermalTime: VariableName=[Phenology].VegetativeThermalTime
              VariableReference Phyllochron: VariableName=[Leaf].Phyllochron
        Constant NReallocationFactor: FixedValue=1
          Memo
            This model assumes that all metabolic and storage N is available for reallocation from senescing leaves.
        PhaseLookup SenescenceRate
          PhaseLookupValue Vegetative: Start=Emergence; End=EndCanopyDevelopment
            Constant Rate: FixedValue=0
          PhaseLookupValue Reproductive: Start=EndCanopyDevelopment; End=Maturity
            DivideFunction Rate
              VariableReference TT: VariableName=[Phenology].ThermalTime
              SubtractFunction TTRemaining
                ExpressionFunction TTRequired
                  Expression=[Phenology].MidGrainFilling.Target + [Phenology].LateGrainFilling.Target + [Phenology].Maturing.Target
                ExpressionFunction TTComplete
                  Expression=[Phenology].MidGrainFilling.ProgressThroughPhase + [Phenology].LateGrainFilling.ProgressThroughPhase + [Phenology].Maturing.ProgressThroughPhase
            Memo
              Leaf senescence rate is calculated to ensure that all leaves are senesced by crop maturity.
            Memo Memo1
              There is no data on detachment rates and so a simple value was chosen to ensure that leaves were not retained in the canopy. In the future, with more data available a thermal time basis leaf detachment rate will be explored.
        Constant DetachmentRate: FixedValue=0.05; Units=/d
        Constant InitialWt: FixedValue=1
        MultiplyFunction LAIDead
          VariableReference SLA: VariableName=[Leaf].SpecificArea
          VariableReference LeafDeadWt: VariableName=[Leaf].Dead.Wt
        LinearInterpolationFunction MaximumNConc
          XYPairs: X=[3, 4, 9]; Y=[0.06, 0.05, 0.03]
          VariableReference XValue: VariableName=[Phenology].Stage
          Memo
            These values have been fitted to the available data. The fitted values are within the observed maximum and minimum values obtained in the FACTS soybean experiments ([ARCHONTOULIS2020721]).
        LinearInterpolationFunction CriticalNConc
          XYPairs: X=[3, 4, 9]; Y=[0.06, 0.05, 0.03]
          VariableReference XValue: VariableName=[Phenology].Stage
        Constant MinimumNConc: FixedValue=0.02
        Constant MaintenanceRespiration: FixedValue=0; Units=0-1
        Constant DMConversionEfficiency: FixedValue=1; Units=0-1
        BiomassRemoval BiomassRemovalDefaults: HarvestFractionLiveToRemove=0; HarvestFractionDeadToRemove=0; HarvestFractionLiveToResidue=1; HarvestFractionDeadToResidue=1
        Constant NRetranslocationFactor: FixedValue=0.5
        Constant DMReallocationFactor: FixedValue=0
        Constant DMRetranslocationFactor: FixedValue=0
        Constant RemobilisationCost: FixedValue=0
        Constant CarbonConcentration: FixedValue=0.4
        NutrientDemandFunctions DMDemands
          DivideFunction Structural
            PhaseLookup DeltaLAIPotential
              Memo
                DeltaLAI describes the LAI variation over the cycle and is calculated using the Area of Largest Leaf, relative leaf area, plant number, branch number and leaf appearance rate (thermal time/phyllochron).
              PhaseLookupValue Vegetative: Start=Emergence; End=EndCanopyDevelopment
                MultiplyFunction Delta
                  VariableReference AreaLargestLeaf: VariableName=[Leaf].AreaLargestLeaf
                  PhaseLookup RelativeArea
                    PhaseLookupValue BeforeEndPod: Start=Emergence; End=StartPodDevelopment
                      LinearInterpolationFunction RelativeArea
                        XYPairs: X=[2, 7, 10, 18]; Y=[0.6666, 1, 1, 0.83]
                        VariableReference XValue: VariableName=[Leaf].NodeNumber
                    PhaseLookupValue AfterEndPod: Start=StartPodDevelopment; End=EndCanopyDevelopment
                      Constant RelativeArea: FixedValue=0.4
                  VariableReference PlantNumber: VariableName=[Soybean].SowingData.Population
                  LinearInterpolationFunction Branches
                    XYPairs: X=[0, 6, 7, 8, 9]; Y=[1, 1, 2, 2, 2]
                    VariableReference XValue: VariableName=[Leaf].NodeNumber
                  DivideFunction LAR
                    VariableReference TT: VariableName=[Phenology].VegetativeThermalTime
                    VariableReference Phyllochron: VariableName=[Leaf].Phyllochron
              PhaseLookupValue Reproductive: Start=EndCanopyDevelopment; End=Maturity
                Constant: FixedValue=0
            VariableReference SLA: VariableName=[Leaf].SpecificArea
            Memo
              Growth in leaf area is used to calculate the leaf dry matter demand. The same was assumed in the original crop models in APSIM. Further model development can be taken once new experimental data for metabolic, structural and storage forms are provided.
            Memo Memo1
              DeltaLAI describes the LAI variation over the cycle and is calculated using the Area of Largest Leaf, relative leaf area, plant number, branch number and leaf appearance rate (thermal time/phyllochron).
          Constant Storage: FixedValue=0
          Constant Metabolic: FixedValue=0
          Constant QStructuralPriority: FixedValue=1
          Constant QMetabolicPriority: FixedValue=1
          Constant QStoragePriority: FixedValue=1
        NutrientDemandFunctions NDemands
          MultiplyFunction Structural
            VariableReference MinNconc: VariableName=[Leaf].minimumNconc
            VariableReference PotentialDMAllocation: VariableName=[Leaf].potentialDMAllocation.Structural
          MultiplyFunction Metabolic
            SubtractFunction MetabolicNconc
              VariableReference CritNconc: VariableName=[Leaf].criticalNConc
              VariableReference MinNconc: VariableName=[Leaf].minimumNconc
            VariableReference PotentialDMAllocation: VariableName=[Leaf].potentialDMAllocation.Structural
          StorageNDemandFunction Storage
            Constant NitrogenDemandSwitch: FixedValue=1
            VariableReference MaxNconc: VariableName=[Leaf].maximumNconc
          Constant QStructuralPriority: FixedValue=1
          Constant QMetabolicPriority: FixedValue=1
          Constant QStoragePriority: FixedValue=1
        LinearInterpolationFunction FrostFraction
          XYPairs: X=[-4, 4]; Y=[1, 0]
          VariableReference XValue: VariableName=[Weather].MinT
        LinearInterpolationFunction SpecificArea
          XYPairs: X=[0.1, 6]; Y=[0.03, 0.03]
          VariableReference XValue: VariableName=[Leaf].LAI
        Constant AreaLargestLeaf: FixedValue=0.006
        Constant Phyllochron: FixedValue=45
      ReproductiveOrgan Grain: GrowthRespiration=0; MaintenanceRespiration=0
        Biomass Live
        Biomass Dead
        Constant PotentialHarvestIndex: FixedValue=0.5
        AddFunction FillingDuration
          VariableReference EarlyGrainFillingDuration: VariableName=[Phenology].EarlyGrainFilling.Target
          VariableReference MidGrainFillingDuration: VariableName=[Phenology].MidGrainFilling.Target
          VariableReference LateGrainFillingDuration: VariableName=[Phenology].LateGrainFilling.Target
        PhaseLookup DMDemandFunction
          PhaseLookupValue GrainFilling: Start=StartGrainFilling; End=EndGrainFill
            MultiplyFunction HIGrainDemand
              VariableReference AboveGroundWt: VariableName=[AboveGround].Wt
              DivideFunction HarvestIndexIncrease
                VariableReference PotentialHarvestIndex: VariableName=[Grain].PotentialHarvestIndex
                VariableReference FillingDuration: VariableName=[Grain].FillingDuration
              VariableReference ThermalTime: VariableName=[Phenology].ThermalTime
        Constant MinimumNConc: FixedValue=0.05
        Constant MaximumNConc: FixedValue=0.058
        Constant WaterContent: FixedValue=0.12
        MultiplyFunction NFillingRate
          VariableReference NConc: VariableName=[Grain].MaximumNConc
          VariableReference DMDemand: VariableName=[Grain].DMDemandFunction
          VariableReference DMConversionEfficiency: VariableName=[Grain].DMConversionEfficiency
        BiomassRemoval BiomassRemovalDefaults: HarvestFractionLiveToRemove=1; HarvestFractionDeadToRemove=1; HarvestFractionLiveToResidue=0; HarvestFractionDeadToResidue=0
        Constant DMConversionEfficiency: FixedValue=0.89
        Constant RemobilisationCost: FixedValue=0
        Constant CarbonConcentration: FixedValue=0.4
        DivideFunction HarvestIndex
          VariableReference GrainWt: VariableName=[Grain].Wt
          VariableReference AboveGroundWt: VariableName=[AboveGround].Wt
        Constant MaximumPotentialGrainSize: FixedValue=0
          Memo
            This parameter is not used.  Grain growth is calculated from harvest index increase.
        Constant NumberFunction: FixedValue=0
          Memo
            Grain number is not estimated by this model.
        NutrientPoolFunctions DMDemandPriorityFactors
          Constant Structural: FixedValue=1
          Constant Metabolic: FixedValue=1
          Constant Storage: FixedValue=1
        NutrientPoolFunctions NDemandPriorityFactors: same as Replacements.Soybean.Grain.DMDemandPriorityFactors
      Root: GrowthRespiration=0; MaintenanceRespiration=0
        MultiplyFunction RootFrontVelocity
          PhaseLookup PotentialRootFrontVelocity
            PhaseLookupValue PreEmergence: Start=Germination; End=Emergence
              Constant Function: FixedValue=5
            PhaseLookupValue early: Start=Emergence; End=StartGrainFilling
              Constant Function: FixedValue=30
            PhaseLookupValue late: Start=StartGrainFilling; End=Maturity
              Constant Function: FixedValue=5
          LinearInterpolationFunction WaterFactor
            SoilWaterScale: LLModel=1
            XYPairs: X=[0, 0.25, 1]; Y=[1, 1, 1]
            VariableReference XValue: VariableName=[SoilWaterScale]
          LinearInterpolationFunction AFPSFactor
            XYPairs: X=[0, 0.03, 1]; Y=[1, 1, 1]
            VariableReference XValue: VariableName=[Root].AirFilledPoreSpace
        Constant MaximumRootDepth: FixedValue=1000000
          Memo
            There is no intrinsic limit to maximum rooting depth.  Roots will be limited by the depth of the soil profile, or via values of XF in each layer.
        RootShapeCylinder RootShape
        Constant KLModifier: FixedValue=1; Units=0-1
          Memo
            No modification to water extraction rate is assumed in this model.
        LinearInterpolationFunction MaxDailyNUptake
          XYPairs: X=[0, 5]; Y=[1, 3]
          VariableReference XValue: VariableName=[Leaf].LAI
        Constant SenescenceRate: FixedValue=0.005; Units=/d
          Memo
            Roots are assumed to simply senesce at a small and constant rate during the entire growth period.
        Constant MaximumNConc: FixedValue=0.01
        Constant MinimumNConc: FixedValue=0.005
        PhaseLookupValue NitrogenDemandSwitch: Start=Emergence; End=EndGrainFill
          Constant: FixedValue=1
        Constant KNO3: FixedValue=0.02
        Constant KNH4: FixedValue=0
          Memo
            The current model version considers only NO3 uptake but NH4 option can be activated by the user . We do not expect activation of NH4 to change total plant N uptake because the nitrification rate (conversion of NH4 to NO3) is very fast in the model. In the future we will re-valuate this.
        BiomassRemoval BiomassRemovalDefaults: HarvestFractionLiveToRemove=0; HarvestFractionDeadToRemove=0; HarvestFractionLiveToResidue=0.2; HarvestFractionDeadToResidue=0
        LinearInterpolationFunction NUptakeSWFactor
          XYPairs: X=[0, 1]; Y=[0, 1]
          VariableReference XValue: VariableName=[Root].RWC
        Constant SpecificRootLength: FixedValue=40; Units=m/g
        Constant DMConversionEfficiency: FixedValue=1
        Constant MaintenanceRespirationFunction: FixedValue=1
        Constant RemobilisationCost: FixedValue=0
        Constant CarbonConcentration: FixedValue=0.4
        NutrientDemandFunctions DMDemands
          MultiplyFunction Structural
            PartitionFractionDemandFunction DMDemandFunction
              PhaseLookup PartitionFraction
                PhaseLookupValue Early: Start=Emergence; End=StartFlowering
                  Constant Function: FixedValue=0.2
                PhaseLookupValue Middle: Start=StartFlowering; End=StartGrainFilling
                  Constant Function: FixedValue=0.2
                PhaseLookupValue Late: Start=StartGrainFilling; End=Maturity
                  Constant Function: FixedValue=0.05
            Constant StructuralFraction: FixedValue=1
          Constant Metabolic: FixedValue=0
          StorageDMDemandFunction Storage
            SubtractFunction StorageFraction
              Constant One: FixedValue=1
              VariableReference StructuralFraction: VariableName=[Root].DMDemands.Structural.StructuralFraction
          Constant QStructuralPriority: FixedValue=1
          Constant QMetabolicPriority: FixedValue=1
          Constant QStoragePriority: FixedValue=1
        NutrientDemandFunctions NDemands
          MultiplyFunction Structural
            VariableReference MinNconc: VariableName=[Root].minimumNconc
            VariableReference PotentialDMAllocation: VariableName=[Root].potentialDMAllocation.Structural
          MultiplyFunction Metabolic
            SubtractFunction MetabolicNconc
              VariableReference CritNconc: VariableName=[Root].criticalNConc
              VariableReference MinNconc: VariableName=[Root].minimumNconc
            VariableReference PotentialDMAllocation: VariableName=[Root].potentialDMAllocation.Structural
          StorageNDemandFunction Storage
            VariableReference NitrogenDemandSwitch: VariableName=[Root].nitrogenDemandSwitch
            VariableReference MaxNconc: VariableName=[Root].maximumNconc
          Constant QStructuralPriority: FixedValue=1
          Constant QMetabolicPriority: FixedValue=1
          Constant QStoragePriority: FixedValue=1
        VariableReference CriticalNConc: VariableName=[Root].MinimumNConc
        NutrientPoolFunctions InitialWt
          Constant Structural: FixedValue=0.2; Units=g/plant
          Constant Metabolic: FixedValue=0
          Constant Storage: FixedValue=0
      Nodule
        Constant FixationMetabolicCost: FixedValue=0
        Constant MaximumNConc: FixedValue=0.02
        Constant MinimumNConc: FixedValue=0.01
        Constant SenescenceRate: FixedValue=0
        Constant NReallocationFactor: FixedValue=0
        PhaseLookupValue NitrogenDemandSwitch: Start=Emergence; End=EndGrainFill
          Constant: FixedValue=1
        BiomassRemoval BiomassRemovalDefaults: HarvestFractionLiveToRemove=0; HarvestFractionDeadToRemove=0; HarvestFractionLiveToResidue=0.2; HarvestFractionDeadToResidue=0
        Constant InitialWtFunction: FixedValue=0; Units=g/m^2
        Constant DetachmentRateFunction: FixedValue=0; Units=/d
        Constant MaintenanceRespirationFunction: FixedValue=0; Units=0-1
        Constant DMConversionEfficiency: FixedValue=1; Units=0-1
        Constant NRetranslocationFactor: FixedValue=0
        Constant DMReallocationFactor: FixedValue=0
        Constant DMRetranslocationFactor: FixedValue=0
        VariableReference CriticalNConc: VariableName=[Nodule].MinimumNConc
        Constant RemobilisationCost: FixedValue=0
        Constant CarbonConcentration: FixedValue=0.4
        HoldFunction FixationRate: WhenToHold=StartGrainFilling
          MinimumFunction DailyPotentialFixationRate
            MultiplyFunction PotentialFixationRate
              VariableReference LiveBiomass: VariableName=[AboveGroundLive].Wt
              PhaseLookup SpecificFixationRate
                PhaseLookupValue VegetativeGrowth: Start=Emergence; End=StartFlowering
                  Constant Rate: FixedValue=0.006
                PhaseLookupValue ReproductiveGrowth: Start=StartFlowering; End=EndGrainFill
                  Constant Rate: FixedValue=0.002
            Constant MaximumFixationRate: FixedValue=0.6; Units=g/g
        NutrientPoolFunctions DMDemands
          MultiplyFunction Structural
            PartitionFractionDemandFunction DMDemandFunction
              PhaseLookup PartitionFraction
                PhaseLookupValue Early: Start=Emergence; End=StartFlowering
                  Constant Function: FixedValue=0.03
                PhaseLookupValue Middle: Start=StartFlowering; End=StartGrainFilling
                  Constant Function: FixedValue=0.02
                PhaseLookupValue Late: Start=StartGrainFilling; End=Maturity
                  Constant Function: FixedValue=0
            Constant StructuralFraction: FixedValue=1; Units=g/g
          Constant Metabolic: FixedValue=0
          StorageDMDemandFunction Storage
            SubtractFunction StorageFraction
              Constant One: FixedValue=1
              VariableReference StructuralFraction: VariableName=[Nodule].DMDemands.Structural.StructuralFraction
        NutrientPoolFunctions NDemands
          MultiplyFunction Structural
            VariableReference MinNconc: VariableName=[Nodule].minimumNconc
            VariableReference PotentialDMAllocation: VariableName=[Nodule].potentialDMAllocation.Structural
          MultiplyFunction Metabolic
            SubtractFunction MetabolicNconc
              VariableReference CritNconc: VariableName=[Nodule].criticalNConc
              VariableReference MinNconc: VariableName=[Nodule].minimumNconc
            VariableReference PotentialDMAllocation: VariableName=[Nodule].potentialDMAllocation.Structural
          StorageNDemandFunction Storage
            VariableReference NitrogenDemandSwitch: VariableName=[Nodule].nitrogenDemandSwitch
            VariableReference MaxNconc: VariableName=[Nodule].maximumNconc
      GenericOrgan Shell: IsAboveGround=true
        Constant NReallocationFactor: FixedValue=1
        Constant NRetranslocationFactor: FixedValue=0.5
        Constant MaximumNConc: FixedValue=0.045
        VariableReference CriticalNConc: VariableName=[Shell].MinimumNConc
        Constant MinimumNConc: FixedValue=0.01
        Constant DMRetranslocationFactor: FixedValue=0.1
        PhaseLookupValue NitrogenDemandSwitch: Start=StartPodDevelopment; End=EndPodDevelopment
          Constant: FixedValue=1
        BiomassRemoval BiomassRemovalDefaults: HarvestFractionLiveToRemove=0; HarvestFractionDeadToRemove=0; HarvestFractionLiveToResidue=1; HarvestFractionDeadToResidue=1
        PhaseLookup SenescenceRate
          PhaseLookupValue ReproductivePhase: Start=StartPodDevelopment; End=Maturity
            MinimumFunction Rate
              DivideFunction Fraction
                VariableReference TT: VariableName=[Phenology].ThermalTime
                SubtractFunction TTRemaining
                  ExpressionFunction ReproductiveTT
                    Expression=[Phenology].EarlyPodDevelopment.Target+[Phenology].EarlyGrainFilling.Target+[Phenology].MidGrainFilling.Target+[Phenology].LateGrainFilling.Target
                  ExpressionFunction ReproductiveTT1Complete
                    Expression=[Phenology].EarlyPodDevelopment.ProgressThroughPhase+[Phenology].EarlyGrainFilling.ProgressThroughPhase+[Phenology].MidGrainFilling.ProgressThroughPhase+[Phenology].LateGrainFilling.ProgressThroughPhase
              Constant One: FixedValue=1
        Constant DetachmentRateFunction: FixedValue=0; Units=/d
        Constant MaintenanceRespirationFunction: FixedValue=0; Units=0-1
        Constant DMConversionEfficiency: FixedValue=1; Units=0-1
        Constant DMReallocationFactor: FixedValue=0
        Constant RemobilisationCost: FixedValue=0
        Constant CarbonConcentration: FixedValue=0.4
        Constant PotentialHarvestIndex: FixedValue=0.2
        AddFunction FillingDuration
          VariableReference EarlyPodDevelopmentDuration: VariableName=[Phenology].EarlyPodDevelopment.Target
          VariableReference EarlyGrainFillingDuration: VariableName=[Phenology].EarlyGrainFilling.Target
          VariableReference MidGrainFillingDuration: VariableName=[Phenology].MidGrainFilling.Target
        NutrientDemandFunctions DMDemands
          MultiplyFunction Structural
            PhaseLookup DMDemandFunction
              PhaseLookupValue PodDevelopment: Start=StartPodDevelopment; End=EndPodDevelopment
                MultiplyFunction HIPodDemand
                  VariableReference AboveGroundWt: VariableName=[AboveGround].Wt
                  DivideFunction HarvestIndexIncrease
                    VariableReference PotentialHarvestIndex: VariableName=[Shell].PotentialHarvestIndex
                    VariableReference FillingDuration: VariableName=[Shell].FillingDuration
                  VariableReference ThermalTime: VariableName=[Phenology].ThermalTime
            Constant StructuralFraction: FixedValue=1
            Memo
              Shell harvest index is used to calculate shell biomass demand, which follows the same approach than grain harvest index. It represents the fraction of shell biomass in relation to total aboveground biomass.
          Constant Metabolic: FixedValue=0
          StorageDMDemandFunction Storage
            SubtractFunction StorageFraction
              Constant One: FixedValue=1
              VariableReference StructuralFraction: VariableName=[Shell].DMDemands.Structural.StructuralFraction
          Constant QStructuralPriority: FixedValue=1
          Constant QMetabolicPriority: FixedValue=1
          Constant QStoragePriority: FixedValue=1
        NutrientDemandFunctions NDemands
          MultiplyFunction Structural
            VariableReference MinNconc: VariableName=[Shell].minimumNconc
            VariableReference PotentialDMAllocation: VariableName=[Shell].potentialDMAllocation.Structural
          StorageNDemandFunction Storage
            VariableReference NitrogenDemandSwitch: VariableName=[Shell].nitrogenDemandSwitch
            VariableReference MaxNconc: VariableName=[Shell].maximumNconc
          Constant Metabolic: FixedValue=0
          Constant QStructuralPriority: FixedValue=1
          Constant QMetabolicPriority: FixedValue=1
          Constant QStoragePriority: FixedValue=1
        RetranslocateNonStructural RetranslocateNitrogen
        NutrientPoolFunctions InitialWt
          Constant Structural: FixedValue=0; Units=g/m^2
          Constant Metabolic: FixedValue=0
          Constant Storage: FixedValue=0
        Constant Photosynthesis: FixedValue=0
        VariableReference initialNConcFunction: VariableName=[Shell].MinimumNConc
      GenericOrgan Stem: IsAboveGround=true
        Constant NReallocationFactor: FixedValue=1
        Constant NRetranslocationFactor: FixedValue=0.5
        PhaseLookup DMRetranslocationFactor
          PhaseLookupValue GrainFilling: Start=EndCanopyDevelopment; End=EndGrainFill
            Constant RetranslocationFactor: FixedValue=0.2
        LinearInterpolationFunction MaximumNConc
          XYPairs: X=[3, 4, 5]; Y=[0.025, 0.02, 0.015]
          VariableReference XValue: VariableName=[Phenology].Stage
        Constant MinimumNConc: FixedValue=0.006
        PhaseLookupValue NitrogenDemandSwitch: Start=Emergence; End=StartGrainFilling
          Memo
            There is no evidence of stem N storage during grain filling. Also, there is no stem structural growth during this time.
          Constant: FixedValue=1
        BiomassRemoval BiomassRemovalDefaults: HarvestFractionLiveToRemove=0; HarvestFractionDeadToRemove=0; HarvestFractionLiveToResidue=1; HarvestFractionDeadToResidue=1
        PhaseLookup SenescenceRate
          PhaseLookupValue PostCanopyPhase: Start=EndCanopyDevelopment; End=Maturity
            MinimumFunction Rate
              DivideFunction Fraction
                VariableReference TT: VariableName=[Phenology].ThermalTime
                SubtractFunction TTRemaining
                  ExpressionFunction PostCanopyTT
                    Expression=[Phenology].EarlyPodDevelopment.Target+[Phenology].EarlyGrainFilling.Target+[Phenology].MidGrainFilling.Target+[Phenology].LateGrainFilling.Target
                  ExpressionFunction PostCanopyTTComplete
                    Expression=[Phenology].MidGrainFilling.ProgressThroughPhase+[Phenology].LateGrainFilling.ProgressThroughPhase
              Constant One: FixedValue=1
        Constant DetachmentRateFunction: FixedValue=0; Units=/d
        Constant MaintenanceRespirationFunction: FixedValue=0; Units=0-1
        Constant DMConversionEfficiency: FixedValue=1; Units=0-1
        Constant DMReallocationFactor: FixedValue=0
        VariableReference CriticalNConc: VariableName=[Stem].MinimumNConc
        Constant RemobilisationCost: FixedValue=0
        Constant CarbonConcentration: FixedValue=0.4
        NutrientDemandFunctions DMDemands
          MultiplyFunction Structural
            PhaseLookup Fraction
              PhaseLookupValue StemGrowthPhase: Start=Emergence; End=StartPodDevelopment
                Constant Fraction: FixedValue=0.75
              PhaseLookupValue PodAndGrainGrowth: Start=StartPodDevelopment; End=EndGrainFill
                Constant Fraction: FixedValue=0
            VariableReference DMDemand: VariableName=[Stem].PotentialGrowth
          Constant Metabolic: FixedValue=0
          MultiplyFunction Storage
            VariableReference DMDemand: VariableName=[Stem].PotentialGrowth
            SubtractFunction StorageFraction
              Constant One: FixedValue=1
              VariableReference StructuralFraction: VariableName=[Stem].DMDemands.Structural.Fraction
          Constant QStructuralPriority: FixedValue=1
          Constant QMetabolicPriority: FixedValue=1
          Constant QStoragePriority: FixedValue=1
        NutrientDemandFunctions NDemands
          MultiplyFunction Structural
            VariableReference MinNconc: VariableName=[Stem].minimumNconc
            VariableReference PotentialDMAllocation: VariableName=[Stem].potentialDMAllocation.Structural
          MultiplyFunction Metabolic
            SubtractFunction MetabolicNconc
              VariableReference CritNconc: VariableName=[Stem].criticalNConc
              VariableReference MinNconc: VariableName=[Stem].minimumNconc
            VariableReference PotentialDMAllocation: VariableName=[Stem].potentialDMAllocation.Structural
          StorageNDemandFunction Storage
            VariableReference NitrogenDemandSwitch: VariableName=[Stem].nitrogenDemandSwitch
            VariableReference MaxNconc: VariableName=[Stem].maximumNconc
          Constant QStructuralPriority: FixedValue=1
          Constant QMetabolicPriority: FixedValue=1
          Constant QStoragePriority: FixedValue=1
        PartitionFractionDemandFunction PotentialGrowth
          PhaseLookup PartitionFraction
            PhaseLookupValue StemGrowthPhase: Start=Emergence; End=EndPodDevelopment
              Constant StemFraction: FixedValue=0.4
            PhaseLookupValue GrainFilling: Start=EndPodDevelopment; End=EndGrainFill
              Constant StemFraction: FixedValue=0
        RetranslocateNonStructural RetranslocateNitrogen
        NutrientPoolFunctions InitialWt: same as Replacements.Soybean.Shell.InitialWt
        Constant Photosynthesis: FixedValue=0
        VariableReference initialNConcFunction: VariableName=[Stem].MinimumNConc
      CompositeBiomass AboveGround: OrganNames=[Leaf, Stem, Grain, Shell]; IncludeLive=true; IncludeDead=true
      CompositeBiomass BelowGround: OrganNames=[Root, Nodule]; IncludeLive=true; IncludeDead=true
      CompositeBiomass AboveGroundLive: OrganNames=[Leaf, Stem, Grain, Shell]; IncludeLive=true; IncludeDead=false
      CompositeBiomass Total: OrganNames=[Leaf, Stem, Grain, Shell, Root, Nodule]; IncludeLive=true; IncludeDead=true
      CompositeBiomass TotalLive: OrganNames=[Leaf, Stem, Grain, Shell, Root, Nodule]; IncludeLive=true; IncludeDead=false
      CompositeBiomass TotalDead: OrganNames=[Leaf, Stem, Grain, Shell, Root, Nodule]; IncludeLive=false; IncludeDead=true
      CompositeBiomass Pod: OrganNames=[Shell, Grain]; IncludeLive=true; IncludeDead=true
      Constant MortalityRate: FixedValue=0
      Constant SeedMortalityRate: FixedValue=0
      Folder Cultivars
        Folder Australia
          Cultivar Buchanan
            Command:
              [Phenology].Vegetative.Target.FixedValue = 480
              [Phenology].EarlyFlowering.Target.FixedValue = 100
              [Phenology].EarlyGrainFilling.Target.FractionofGrainfilling.FixedValue = 0.015
              [Phenology].LateGrainFilling.Target.EntireGrainfillPeriod.FixedValue = 467
              [Phenology].VegetativePhotoperiodModifier.XYPairs.X = 12.39, 15.61
              [Phenology].ReproductivePhotoperiodModifier.XYPairs.X = 12.39, 15.61
              [Phenology].MidGrainFilling.Target.FractionofMidToLateGrainfilling.FixedValue=0.33
              [Grain].MaximumNConc.FixedValue = 0.067
              [Stem].PotentialGrowth.PartitionFraction.StemGrowthPhase.StemFraction.FixedValue = 0.5
              [Leaf].AreaLargestLeaf.FixedValue=0.009
          Cultivar Djakal
            Command:
              [Phenology].Vegetative.Target.FixedValue = 380
              [Phenology].EarlyFlowering.Target.FixedValue = 100
              [Phenology].EarlyGrainFilling.Target.FractionofGrainfilling.FixedValue = 0.05
              [Phenology].LateGrainFilling.Target.EntireGrainfillPeriod.FixedValue = 405
              [Phenology].VegetativePhotoperiodModifier.XYPairs.X = 13.75, 17
              [Phenology].ReproductivePhotoperiodModifier.XYPairs.X = 11.9, 15.5
              [Leaf].AreaLargestLeaf.FixedValue=0.009
          Cultivar Davis
            Command:
              [Phenology].Vegetative.Target.FixedValue = 480
              [Phenology].EarlyFlowering.Target.FixedValue = 100
              [Phenology].EarlyGrainFilling.Target.FractionofGrainfilling.FixedValue = 0.015
              [Phenology].LateGrainFilling.Target.EntireGrainfillPeriod.FixedValue = 467
              [Phenology].VegetativePhotoperiodModifier.XYPairs.X = 12.39, 15.61
              [Phenology].ReproductivePhotoperiodModifier.XYPairs.X = 12.39, 15.61
              [Phenology].MidGrainFilling.Target.FractionofMidToLateGrainfilling.FixedValue=0.33
              [Grain].MaximumNConc.FixedValue = 0.067
              [Stem].PotentialGrowth.PartitionFraction.StemGrowthPhase.StemFraction.FixedValue = 0.5
              [Leaf].AreaLargestLeaf.FixedValue=0.012
          Cultivar Hooper_MG40
            Command:
              [Phenology].Vegetative.Target.FixedValue = 380
              [Phenology].EarlyFlowering.Target.FixedValue = 80
              [Phenology].EarlyGrainFilling.Target.FractionofGrainfilling.FixedValue = 0.05
              [Phenology].LateGrainFilling.Target.EntireGrainfillPeriod.FixedValue = 440
              [Phenology].VegetativePhotoperiodModifier.XYPairs.X = 13.26, 16.67
              [Phenology].ReproductivePhotoperiodModifier.XYPairs.X = 13.26, 16.67
              [Leaf].AreaLargestLeaf.FixedValue=0.009
          Cultivar Stephens_MG40
            Command:
              [Phenology].Vegetative.Target.FixedValue = 360
              [Phenology].EarlyFlowering.Target.FixedValue = 80
              [Phenology].EarlyGrainFilling.Target.FractionofGrainfilling.FixedValue = 0.05
              [Phenology].LateGrainFilling.Target.EntireGrainfillPeriod.FixedValue = 440
              [Phenology].VegetativePhotoperiodModifier.XYPairs.X = 13.26, 16.67
              [Phenology].ReproductivePhotoperiodModifier.XYPairs.X = 13.26, 16.67
              [Leaf].AreaLargestLeaf.FixedValue=0.009
          Cultivar FiskebyV
            Command:
              [Phenology].Vegetative.Target.FixedValue = 285
              [Phenology].EarlyFlowering.Target.FixedValue = 80
              [Phenology].EarlyGrainFilling.Target.FractionofGrainfilling.FixedValue = 0.05
              [Phenology].LateGrainFilling.Target.EntireGrainfillPeriod.FixedValue = 405
              [Phenology].VegetativePhotoperiodModifier.XYPairs.X = 13.75, 18
              [Phenology].ReproductivePhotoperiodModifier.XYPairs.X = 13.75, 18
            Memo
              Early-maturing, photoperiod-insensitive cultivar developed in Sweden for high latitude environments
          Cultivar F148_7
            Command:
              [Phenology].Vegetative.Target.FixedValue = 314
              [Phenology].EarlyFlowering.Target.FixedValue = 80
              [Phenology].EarlyGrainFilling.Target.FractionofGrainfilling.FixedValue = 0.05
              [Phenology].LateGrainFilling.Target.EntireGrainfillPeriod.FixedValue = 485
              [Phenology].VegetativePhotoperiodModifier.XYPairs.X = 13.75, 17
              [Phenology].ReproductivePhotoperiodModifier.XYPairs.X = 12, 18
              [Leaf].AreaLargestLeaf.FixedValue=0.009
            Memo
              Indeterminate breeding selection from the national soybean breeding program combining phytophthora resistance, earliness,
              culinary quality, and yield
          Cultivar Bowyer
            Command:
              [Phenology].Vegetative.Target.FixedValue = 377
              [Phenology].EarlyFlowering.Target.FixedValue = 80
              [Phenology].EarlyGrainFilling.Target.FractionofGrainfilling.FixedValue = 0.05
              [Phenology].LateGrainFilling.Target.EntireGrainfillPeriod.FixedValue = 405
              [Phenology].VegetativePhotoperiodModifier.XYPairs.X = 13.75, 15.5
              [Phenology].ReproductivePhotoperiodModifier.XYPairs.X = 11.9, 15.5
            Memo
              Brown hilum cultivar, adapted to southern New South Wales, released by K McWhirter in 1982
          Cultivar Bunya
            Command:
              [Phenology].Vegetative.Target.FixedValue = 550
              [Phenology].EarlyFlowering.Target.FixedValue = 80
              [Phenology].EarlyGrainFilling.Target.FractionofGrainfilling.FixedValue = 0.05
              [Phenology].LateGrainFilling.Target.EntireGrainfillPeriod.FixedValue = 405
              [Phenology].VegetativePhotoperiodModifier.XYPairs.X = 13.75, 18
              [Phenology].ReproductivePhotoperiodModifier.XYPairs.X = 10.9, 15.5
              [Leaf].AreaLargestLeaf.FixedValue=0.009
            Memo
              Culinary cultivar released in 2006 by CSIRO with broad adaptation from northern New South Wales to northern Queensland
          Cultivar Cowrie
            Command:
              [Phenology].Vegetative.Target.FixedValue = 390
              [Phenology].EarlyFlowering.Target.FixedValue = 80
              [Phenology].EarlyGrainFilling.Target.FractionofGrainfilling.FixedValue = 0.05
              [Phenology].LateGrainFilling.Target.EntireGrainfillPeriod.FixedValue = 425
              [Phenology].VegetativePhotoperiodModifier.XYPairs.X = 12.75, 16
              [Phenology].ReproductivePhotoperiodModifier.XYPairs.X = 12.75, 16
              [Leaf].AreaLargestLeaf.FixedValue=0.009
            Memo
              Light hilum cultivar released by theNewSouth Wales Department of Agriculture for the coastal Northern Rivers District inNewSouth Wales
          Cultivar Soya791
            Command:
              [Phenology].Vegetative.Target.FixedValue = 430
              [Phenology].EarlyFlowering.Target.FixedValue = 80
              [Phenology].EarlyGrainFilling.Target.FractionofGrainfilling.FixedValue = 0.05
              [Phenology].LateGrainFilling.Target.EntireGrainfillPeriod.FixedValue = 425
              [Phenology].VegetativePhotoperiodModifier.XYPairs.X = 12.75, 15.3
              [Phenology].ReproductivePhotoperiodModifier.XYPairs.X = 12.75, 15.3
              [Leaf].AreaLargestLeaf.FixedValue=0.009
          Cultivar Manark
            Command:
              [Phenology].Vegetative.Target.FixedValue = 440
              [Phenology].EarlyFlowering.Target.FixedValue = 80
              [Phenology].EarlyGrainFilling.Target.FractionofGrainfilling.FixedValue = 0.05
              [Phenology].LateGrainFilling.Target.EntireGrainfillPeriod.FixedValue = 425
              [Phenology].VegetativePhotoperiodModifier.XYPairs.X = 12.75, 15
              [Phenology].ReproductivePhotoperiodModifier.XYPairs.X = 12.75, 15
              [Leaf].AreaLargestLeaf.FixedValue=0.009
          Cultivar Warrigal
            Command:
              [Phenology].Vegetative.Target.FixedValue = 490
              [Phenology].EarlyFlowering.Target.FixedValue = 80
              [Phenology].EarlyGrainFilling.Target.FractionofGrainfilling.FixedValue = 0.05
              [Phenology].LateGrainFilling.Target.EntireGrainfillPeriod.FixedValue = 425
              [Phenology].VegetativePhotoperiodModifier.XYPairs.X = 12.75, 15
              [Phenology].ReproductivePhotoperiodModifier.XYPairs.X = 12.75, 15
              [Leaf].AreaLargestLeaf.FixedValue=0.009
          Cultivar Leichhardt
            Command:
              [Phenology].Vegetative.Target.FixedValue = 806
              [Phenology].EarlyFlowering.Target.FixedValue = 80
              [Phenology].EarlyGrainFilling.Target.FractionofGrainfilling.FixedValue = 0.05
              [Phenology].LateGrainFilling.Target.EntireGrainfillPeriod.FixedValue = 425
              [Phenology].VegetativePhotoperiodModifier.XYPairs.X = 12.75, 14.7
              [Phenology].ReproductivePhotoperiodModifier.XYPairs.X = 12.75, 14.7
              [Leaf].AreaLargestLeaf.FixedValue=0.009
          Cultivar Djakal1
            Command:
              [Phenology].Vegetative.Target.FixedValue = 332
              [Phenology].EarlyFlowering.Target.FixedValue = 80
              [Phenology].EarlyGrainFilling.Target.FractionofGrainfilling.FixedValue = 0.05
              [Phenology].LateGrainFilling.Target.EntireGrainfillPeriod.FixedValue = 440
              [Phenology].VegetativePhotoperiodModifier.XYPairs.X = 13.26, 16.67
              [Phenology].ReproductivePhotoperiodModifier.XYPairs.X = 13.26, 16.67
              [Leaf].AreaLargestLeaf.FixedValue=0.009
        Folder USA
          Cultivar Trial_MG00
            Command:
              [Phenology].Vegetative.Target.FixedValue = 268
              [Phenology].EarlyFlowering.Target.FixedValue = 76
              [Phenology].EarlyGrainFilling.Target.FractionofGrainfilling.FixedValue = 0.05
              [Phenology].LateGrainFilling.Target.EntireGrainfillPeriod.FixedValue = 432
              [Phenology].VegetativePhotoperiodModifier.XYPairs.X = 14.43, 21.19
              [Phenology].ReproductivePhotoperiodModifier.XYPairs.X = 14.43, 21.19
          Cultivar Lambert_MG0
            Command:
              [Phenology].Vegetative.Target.FixedValue = 294
              [Phenology].EarlyFlowering.Target.FixedValue = 81
              [Phenology].EarlyGrainFilling.Target.FractionofGrainfilling.FixedValue = 0.05
              [Phenology].LateGrainFilling.Target.EntireGrainfillPeriod.FixedValue = 442
              [Phenology].VegetativePhotoperiodModifier.XYPairs.X = 14.29, 20.14
              [Phenology].ReproductivePhotoperiodModifier.XYPairs.X = 14.29, 20.14
          Cultivar IA1006_MG10
            Command:
              [Phenology].Vegetative.Target.FixedValue = 336
              [Phenology].EarlyFlowering.Target.FixedValue = 118
              [Phenology].EarlyGrainFilling.Target.FractionofGrainfilling.FixedValue = 0.05
              [Phenology].LateGrainFilling.Target.EntireGrainfillPeriod.FixedValue = 518
              [Phenology].VegetativePhotoperiodModifier.XYPairs.X = 14.37, 19.30
              [Phenology].ReproductivePhotoperiodModifier.XYPairs.X = 14.37, 19.30
          Cultivar IA2008_MG20
            Command:
              [Phenology].Vegetative.Target.FixedValue = 329
              [Phenology].EarlyFlowering.Target.FixedValue = 150
              [Phenology].EarlyGrainFilling.Target.FractionofGrainfilling.FixedValue = 0.05
              [Phenology].LateGrainFilling.Target.EntireGrainfillPeriod.FixedValue = 580
              [Phenology].VegetativePhotoperiodModifier.XYPairs.X = 13.92, 17.93
              [Phenology].ReproductivePhotoperiodModifier.XYPairs.X = 13.92, 17.93
          Cultivar PioneerP22T61_MG22
            Command:
              [Phenology].Vegetative.Target.FixedValue = 328
              [Phenology].EarlyFlowering.Target.FixedValue = 106
              [Phenology].EarlyGrainFilling.Target.FractionofGrainfilling.FixedValue = 0.3
              [Phenology].LateGrainFilling.Target.EntireGrainfillPeriod.FixedValue = 499
              [Phenology].VegetativePhotoperiodModifier.XYPairs.X = 13.59, 17.6
              [Phenology].ReproductivePhotoperiodModifier.XYPairs.X = 13.59, 17.6
          Cultivar PioneerP22T69R_MG22
            Command:
              [Phenology].Vegetative.Target.FixedValue = 328
              [Phenology].EarlyFlowering.Target.FixedValue = 106
              [Phenology].EarlyGrainFilling.Target.FractionofGrainfilling.FixedValue = 0.35
              [Phenology].LateGrainFilling.Target.EntireGrainfillPeriod.FixedValue = 580
              [Phenology].VegetativePhotoperiodModifier.XYPairs.X = 13.59, 17.6
              [Phenology].ReproductivePhotoperiodModifier.XYPairs.X = 13.59, 17.6
          Cultivar Pioneer92MGI_MG26
            Command:
              [Phenology].Vegetative.Target.FixedValue = 271
              [Phenology].EarlyFlowering.Target.FixedValue = 120
              [Phenology].EarlyGrainFilling.Target.FractionofGrainfilling.FixedValue = 0.125
              [Phenology].LateGrainFilling.Target.EntireGrainfillPeriod.FixedValue = 529
              [Phenology].VegetativePhotoperiodModifier.XYPairs.X = 13.77, 17.57
              [Phenology].ReproductivePhotoperiodModifier.XYPairs.X = 13.77, 17.57
          Cultivar PioneerP92Y75_MG27
            Command:
              [Phenology].Vegetative.Target.FixedValue = 328
              [Phenology].EarlyFlowering.Target.FixedValue = 106
              [Phenology].EarlyGrainFilling.Target.FractionofGrainfilling.FixedValue = 0.14
              [Phenology].LateGrainFilling.Target.EntireGrainfillPeriod.FixedValue = 499
              [Phenology].VegetativePhotoperiodModifier.XYPairs.X = 13.59, 17.6
              [Phenology].ReproductivePhotoperiodModifier.XYPairs.X = 13.59, 17.6
          Cultivar Macon_MG30
            Command:
              [Phenology].Vegetative.Target.FixedValue = 367
              [Phenology].EarlyFlowering.Target.FixedValue = 163
              [Phenology].EarlyGrainFilling.Target.FractionofGrainfilling.FixedValue = 0.175
              [Phenology].LateGrainFilling.Target.EntireGrainfillPeriod.FixedValue = 607
              [Phenology].VegetativePhotoperiodModifier.XYPairs.X = 14.05, 17.56
              [Phenology].ReproductivePhotoperiodModifier.XYPairs.X = 14.05, 17.56
          Cultivar PioneerP93M11_MG31
            Command:
              [Phenology].Vegetative.Target.FixedValue = 250
              [Phenology].EarlyFlowering.Target.FixedValue = 110
              [Phenology].EarlyGrainFilling.Target.FractionofGrainfilling.FixedValue = 0.30
              [Phenology].LateGrainFilling.Target.EntireGrainfillPeriod.FixedValue = 457
              [Phenology].VegetativePhotoperiodModifier.XYPairs.X = 13.4, 16.0
              [Phenology].ReproductivePhotoperiodModifier.XYPairs.X = 13.4, 16.0
              [Grain].MaximumNConc.FixedValue = 0.065
              [Shell].PotentialHarvestIndex.FixedValue = 0.5
              [Leaf].AreaLargestLeaf.FixedValue=0.013
          Cultivar Becks321NRR_MG32
            Command:
              [Phenology].Vegetative.Target.FixedValue = 272
              [Phenology].EarlyFlowering.Target.FixedValue = 117
              [Phenology].EarlyGrainFilling.Target.FractionofGrainfilling.FixedValue = 0.20
              [Phenology].LateGrainFilling.Target.EntireGrainfillPeriod.FixedValue = 522
              [Phenology].VegetativePhotoperiodModifier.XYPairs.X = 13.45, 18.0
              [Phenology].ReproductivePhotoperiodModifier.XYPairs.X = 13.45, 18.0
          Cultivar PioneerP932T16R_MG32
            Command:
              [Phenology].Vegetative.Target.FixedValue = 328
              [Phenology].EarlyFlowering.Target.FixedValue = 106
              [Phenology].EarlyGrainFilling.Target.FractionofGrainfilling.FixedValue = 0.40
              [Phenology].LateGrainFilling.Target.EntireGrainfillPeriod.FixedValue = 499
              [Phenology].VegetativePhotoperiodModifier.XYPairs.X = 13.59, 17.6
              [Phenology].ReproductivePhotoperiodModifier.XYPairs.X = 13.59, 17.6
          Cultivar Becks367NRR_MG37
            Command:
              [Phenology].Vegetative.Target.FixedValue = 267
              [Phenology].EarlyFlowering.Target.FixedValue = 112
              [Phenology].EarlyGrainFilling.Target.FractionofGrainfilling.FixedValue = 0.26
              [Phenology].LateGrainFilling.Target.EntireGrainfillPeriod.FixedValue = 506
              [Phenology].VegetativePhotoperiodModifier.XYPairs.X = 13.27, 17.2
              [Phenology].ReproductivePhotoperiodModifier.XYPairs.X = 13.27, 17.2
          Cultivar AsgrowAG4403_MG40
            Command:
              [Phenology].Vegetative.Target.FixedValue = 292
              [Phenology].EarlyFlowering.Target.FixedValue = 123
              [Phenology].EarlyGrainFilling.Target.FractionofGrainfilling.FixedValue = 0.30
              [Phenology].LateGrainFilling.Target.EntireGrainfillPeriod.FixedValue = 535
              [Phenology].VegetativePhotoperiodModifier.XYPairs.X = 13.09, 16.49
              [Phenology].ReproductivePhotoperiodModifier.XYPairs.X = 13.09, 16.49
          Cultivar HornbeckHBK4891_MG40: same as Replacements.Soybean.Cultivars.USA.AsgrowAG4403_MG40
          Cultivar Pioneer94B01_MG40
            Command:
              [Phenology].Vegetative.Target.FixedValue = 322
              [Phenology].EarlyFlowering.Target.FixedValue = 143
              [Phenology].EarlyGrainFilling.Target.FractionofGrainfilling.FixedValue = 0.30
              [Phenology].LateGrainFilling.Target.EntireGrainfillPeriod.FixedValue = 567
              [Phenology].VegetativePhotoperiodModifier.XYPairs.X = 13.05, 16.46
              [Phenology].ReproductivePhotoperiodModifier.XYPairs.X = 13.05, 16.46
          Cultivar PioneerP9504_MG50
            Command:
              [Phenology].Vegetative.Target.FixedValue = 404
              [Phenology].EarlyFlowering.Target.FixedValue = 112
              [Phenology].EarlyGrainFilling.Target.FractionofGrainfilling.FixedValue = 0.30
              [Phenology].LateGrainFilling.Target.EntireGrainfillPeriod.FixedValue = 505
              [Phenology].VegetativePhotoperiodModifier.XYPairs.X = 12.83, 16.13
              [Phenology].ReproductivePhotoperiodModifier.XYPairs.X = 12.83, 16.13
          Cultivar AsgrowAG5701_MG50
            Command:
              [Phenology].Vegetative.Target.FixedValue = 404
              [Phenology].EarlyFlowering.Target.FixedValue = 131
              [Phenology].EarlyGrainFilling.Target.FractionofGrainfilling.FixedValue = 0.30
              [Phenology].LateGrainFilling.Target.EntireGrainfillPeriod.FixedValue = 549
              [Phenology].VegetativePhotoperiodModifier.XYPairs.X = 12.83, 16.13
              [Phenology].ReproductivePhotoperiodModifier.XYPairs.X = 12.83, 16.13
          Cultivar Hutcheson_MG50
            Command:
              [Phenology].Vegetative.Target.FixedValue = 438
              [Phenology].EarlyFlowering.Target.FixedValue = 112
              [Phenology].EarlyGrainFilling.Target.FractionofGrainfilling.FixedValue = 0.30
              [Phenology].LateGrainFilling.Target.EntireGrainfillPeriod.FixedValue = 505
              [Phenology].VegetativePhotoperiodModifier.XYPairs.X = 12.58, 15.88
              [Phenology].ReproductivePhotoperiodModifier.XYPairs.X = 12.58, 15.88
          Cultivar NK622_MG60
            Command:
              [Phenology].Vegetative.Target.FixedValue = 436
              [Phenology].EarlyFlowering.Target.FixedValue = 93
              [Phenology].EarlyGrainFilling.Target.FractionofGrainfilling.FixedValue = 0.30
              [Phenology].LateGrainFilling.Target.EntireGrainfillPeriod.FixedValue = 467
              [Phenology].VegetativePhotoperiodModifier.XYPairs.X = 12.39, 15.61
              [Phenology].ReproductivePhotoperiodModifier.XYPairs.X = 12.39, 15.61
        Folder China
          Cultivar Nandou12
            Command:
              [Phenology].Vegetative.Target.FixedValue = 500
              [Phenology].EarlyFlowering.Target.FixedValue = 120
              [Phenology].EarlyPodDevelopment.Target.FixedValue = 180
              [Phenology].EarlyGrainFilling.Target.FractionofGrainfilling.FixedValue = 0.2
              [Phenology].LateGrainFilling.Target.EntireGrainfillPeriod.FixedValue = 440
              [Phenology].VegetativePhotoperiodModifier.XYPairs.X = 12.63, 15.13
              [Phenology].ReproductivePhotoperiodModifier.XYPairs.X = 12.63, 15.13
              [Phenology].MidGrainFilling.Target.FractionofMidToLateGrainfilling.FixedValue=0.45
              [Leaf].AreaLargestLeaf.FixedValue=0.013
              [Grain].PotentialHarvestIndex.FixedValue=0.35
          Cultivar Texuan13
            Command:
              [Phenology].Vegetative.Target.FixedValue = 500
              [Phenology].EarlyFlowering.Target.FixedValue = 200
              [Phenology].EarlyPodDevelopment.Target.FixedValue = 170
              [Phenology].EarlyGrainFilling.Target.FractionofGrainfilling.FixedValue = 0.2
              [Phenology].LateGrainFilling.Target.EntireGrainfillPeriod.FixedValue = 460
              [Phenology].VegetativePhotoperiodModifier.XYPairs.X = 12.63, 15.13
              [Phenology].ReproductivePhotoperiodModifier.XYPairs.X = 12.63, 15.13
              [Phenology].MidGrainFilling.Target.FractionofMidToLateGrainfilling.FixedValue=0.45
              [Leaf].AreaLargestLeaf.FixedValue=0.013
              [Grain].PotentialHarvestIndex.FixedValue=0.35
          Cultivar Jiuyuehuang
            Command:
              [Phenology].Vegetative.Target.FixedValue = 540
              [Phenology].EarlyFlowering.Target.FixedValue = 140
              [Phenology].EarlyPodDevelopment.Target.FixedValue = 140
              [Phenology].EarlyGrainFilling.Target.FractionofGrainfilling.FixedValue = 0.2
              [Phenology].LateGrainFilling.Target.EntireGrainfillPeriod.FixedValue = 420
              [Phenology].VegetativePhotoperiodModifier.XYPairs.X = 12.94, 15.44
              [Phenology].ReproductivePhotoperiodModifier.XYPairs.X = 12.94, 15.44
              [Phenology].MidGrainFilling.Target.FractionofMidToLateGrainfilling.FixedValue=0.45
              [Leaf].AreaLargestLeaf.FixedValue=0.013
              [Grain].PotentialHarvestIndex.FixedValue=0.25
          Cultivar Hedou19
            Command:
              [Phenology].Vegetative.Target.FixedValue = 370
              [Phenology].EarlyFlowering.Target.FixedValue = 120
              [Phenology].EarlyPodDevelopment.Target.FixedValue = 180
              [Phenology].EarlyGrainFilling.Target.FractionofGrainfilling.FixedValue = 0.361
              [Phenology].LateGrainFilling.Target.EntireGrainfillPeriod.FixedValue = 600
              [Phenology].VegetativePhotoperiodModifier.XYPairs.X = 13.57, 16.07
              [Phenology].ReproductivePhotoperiodModifier.XYPairs.X = 13.57, 16.07
              [Phenology].MidGrainFilling.Target.FractionofMidToLateGrainfilling.FixedValue=0.45
              [Leaf].AreaLargestLeaf.FixedValue=0.02
              [Leaf].Phyllochron.FixedValue=45
        Folder Generic
          Cultivar Generic_MG000
            Command:
              [Phenology].Vegetative.Target.FixedValue = 310
              [Phenology].EarlyFlowering.Target.FixedValue = 100
              [Phenology].EarlyGrainFilling.Target.FractionofGrainfilling.FixedValue = 0.475
              [Phenology].LateGrainFilling.Target.EntireGrainfillPeriod.FixedValue = 590
              [Phenology].VegetativePhotoperiodModifier.XYPairs.X = 14.6, 22.35
              [Phenology].ReproductivePhotoperiodModifier.XYPairs.X = 14.6, 22.35
          Cultivar Generic_MG00
            Command:
              [Phenology].Vegetative.Target.FixedValue = 320
              [Phenology].EarlyFlowering.Target.FixedValue = 100
              [Phenology].EarlyGrainFilling.Target.FractionofGrainfilling.FixedValue = 0.467
              [Phenology].LateGrainFilling.Target.EntireGrainfillPeriod.FixedValue = 600
              [Phenology].VegetativePhotoperiodModifier.XYPairs.X = 14.35, 21.11
              [Phenology].ReproductivePhotoperiodModifier.XYPairs.X = 14.35, 21.11
          Cultivar Generic_MG0
            Command:
              [Phenology].Vegetative.Target.FixedValue = 336
              [Phenology].EarlyFlowering.Target.FixedValue = 120
              [Phenology].EarlyGrainFilling.Target.FractionofGrainfilling.FixedValue = 0.422
              [Phenology].LateGrainFilling.Target.EntireGrainfillPeriod.FixedValue = 616
              [Phenology].VegetativePhotoperiodModifier.XYPairs.X = 14.1, 19.95
              [Phenology].ReproductivePhotoperiodModifier.XYPairs.X = 14.1, 19.95
          Cultivar Generic_MG1
            Command:
              [Phenology].Vegetative.Target.FixedValue = 340
              [Phenology].EarlyFlowering.Target.FixedValue = 120
              [Phenology].EarlyGrainFilling.Target.FractionofGrainfilling.FixedValue = 0.411
              [Phenology].LateGrainFilling.Target.EntireGrainfillPeriod.FixedValue = 632
              [Phenology].VegetativePhotoperiodModifier.XYPairs.X = 13.84, 18.77
              [Phenology].ReproductivePhotoperiodModifier.XYPairs.X = 13.84, 18.77
          Cultivar Generic_MG2
            Command:
              [Phenology].Vegetative.Target.FixedValue = 348
              [Phenology].EarlyFlowering.Target.FixedValue = 120
              [Phenology].EarlyGrainFilling.Target.FractionofGrainfilling.FixedValue = 0.386
              [Phenology].LateGrainFilling.Target.EntireGrainfillPeriod.FixedValue = 648
              [Phenology].VegetativePhotoperiodModifier.XYPairs.X = 13.59, 17.61
              [Phenology].ReproductivePhotoperiodModifier.XYPairs.X = 13.59, 17.61
          Cultivar Generic_MG3
            Command:
              [Phenology].Vegetative.Target.FixedValue = 380
              [Phenology].EarlyFlowering.Target.FixedValue = 120
              [Phenology].EarlyGrainFilling.Target.FractionofGrainfilling.FixedValue = 0.361
              [Phenology].LateGrainFilling.Target.EntireGrainfillPeriod.FixedValue = 664
              [Phenology].VegetativePhotoperiodModifier.XYPairs.X = 13.4, 16.91
              [Phenology].ReproductivePhotoperiodModifier.XYPairs.X = 13.4, 16.91
          Cultivar Generic_MG4
            Command:
              [Phenology].Vegetative.Target.FixedValue = 388
              [Phenology].EarlyFlowering.Target.FixedValue = 140
              [Phenology].EarlyGrainFilling.Target.FractionofGrainfilling.FixedValue = 0.324
              [Phenology].LateGrainFilling.Target.EntireGrainfillPeriod.FixedValue = 664
              [Phenology].VegetativePhotoperiodModifier.XYPairs.X = 13.1, 16.49
              [Phenology].ReproductivePhotoperiodModifier.XYPairs.X = 13.1, 16.49
          Cultivar Generic_MG5
            Command:
              [Phenology].Vegetative.Target.FixedValue = 396
              [Phenology].EarlyFlowering.Target.FixedValue = 160
              [Phenology].EarlyGrainFilling.Target.FractionofGrainfilling.FixedValue = 0.072
              [Phenology].LateGrainFilling.Target.EntireGrainfillPeriod.FixedValue = 696
              [Phenology].VegetativePhotoperiodModifier.XYPairs.X = 12.83, 16.13
              [Phenology].ReproductivePhotoperiodModifier.XYPairs.X = 12.83, 16.13
          Cultivar Generic_MG6
            Command:
              [Phenology].Vegetative.Target.FixedValue = 404
              [Phenology].EarlyFlowering.Target.FixedValue = 180
              [Phenology].EarlyGrainFilling.Target.FractionofGrainfilling.FixedValue = 0.056
              [Phenology].LateGrainFilling.Target.EntireGrainfillPeriod.FixedValue = 712
              [Phenology].VegetativePhotoperiodModifier.XYPairs.X = 12.58, 15.8
              [Phenology].ReproductivePhotoperiodModifier.XYPairs.X = 12.58, 15.8
          Cultivar Generic_MG7
            Command:
              [Phenology].Vegetative.Target.FixedValue = 416
              [Phenology].EarlyFlowering.Target.FixedValue = 200
              [Phenology].EarlyGrainFilling.Target.FractionofGrainfilling.FixedValue = 0.055
              [Phenology].LateGrainFilling.Target.EntireGrainfillPeriod.FixedValue = 728
              [Phenology].VegetativePhotoperiodModifier.XYPairs.X = 12.33, 15.46
              [Phenology].ReproductivePhotoperiodModifier.XYPairs.X = 12.33, 15.46
          Cultivar Generic_MG8
            Command:
              [Phenology].Vegetative.Target.FixedValue = 430
              [Phenology].EarlyFlowering.Target.FixedValue = 200
              [Phenology].EarlyGrainFilling.Target.FractionofGrainfilling.FixedValue = 0.054
              [Phenology].LateGrainFilling.Target.EntireGrainfillPeriod.FixedValue = 744
              [Phenology].VegetativePhotoperiodModifier.XYPairs.X = 12.07, 15.1
              [Phenology].ReproductivePhotoperiodModifier.XYPairs.X = 12.07, 15.1
          Cultivar Generic_MG9
            Command:
              [Phenology].Vegetative.Target.FixedValue = 460
              [Phenology].EarlyFlowering.Target.FixedValue = 200
              [Phenology].EarlyGrainFilling.Target.FractionofGrainfilling.FixedValue = 0.053
              [Phenology].LateGrainFilling.Target.EntireGrainfillPeriod.FixedValue = 748
              [Phenology].VegetativePhotoperiodModifier.XYPairs.X = 11.88, 14.82
              [Phenology].ReproductivePhotoperiodModifier.XYPairs.X = 11.88, 14.82
          Cultivar Generic_MG10
            Command:
              [Phenology].Vegetative.Target.FixedValue = 470
              [Phenology].EarlyFlowering.Target.FixedValue = 200
              [Phenology].EarlyGrainFilling.Target.FractionofGrainfilling.FixedValue = 0.053
              [Phenology].LateGrainFilling.Target.EntireGrainfillPeriod.FixedValue = 748
              [Phenology].VegetativePhotoperiodModifier.XYPairs.X = 11.78, 14.65
              [Phenology].ReproductivePhotoperiodModifier.XYPairs.X = 11.78, 14.65
      Folder Elli
        Cultivar Generic_MG5_LongRep
          Command:
            [Phenology].Vegetative.Target.FixedValue = 340
            [Phenology].EarlyFlowering.Target.FixedValue = 70
            [Phenology].EarlyGrainFilling.Target.FractionofGrainfilling.FixedValue = 0.072
            [Phenology].LateGrainFilling.Target.EntireGrainfillPeriod.FixedValue = 650
            [Phenology].VegetativePhotoperiodModifier.XYPairs.X = 12.83, 16.13
            [Phenology].ReproductivePhotoperiodModifier.XYPairs.X = 12.83, 16.13
            [Leaf].AreaLargestLeaf.FixedValue=0.007
            [Leaf].Photosynthesis.RUE.FixedValue=1.25
        Cultivar PurcellMG4
          Command:
            [Phenology].Vegetative.Target.FixedValue = 340
            [Phenology].EarlyFlowering.Target.FixedValue = 140
            [Phenology].EarlyGrainFilling.Target.FractionofGrainfilling.FixedValue = 0.324
            [Phenology].LateGrainFilling.Target.EntireGrainfillPeriod.FixedValue = 540
            [Phenology].VegetativePhotoperiodModifier.XYPairs.X = 13.1, 16.49
            [Phenology].ReproductivePhotoperiodModifier.XYPairs.X = 13.1, 16.49
            [Leaf].AreaLargestLeaf.FixedValue=0.007
            [Leaf].Photosynthesis.RUE.FixedValue=1.25
        Cultivar PurcellMG5
          Command:
            [Phenology].Vegetative.Target.FixedValue = 370
            [Phenology].EarlyFlowering.Target.FixedValue = 100
            [Phenology].EarlyGrainFilling.Target.FractionofGrainfilling.FixedValue = 0.072
            [Phenology].LateGrainFilling.Target.EntireGrainfillPeriod.FixedValue = 580
            [Phenology].VegetativePhotoperiodModifier.XYPairs.X = 12.83, 16.13
            [Phenology].ReproductivePhotoperiodModifier.XYPairs.X = 12.83, 16.13
            [Leaf].AreaLargestLeaf.FixedValue=0.007
            [Leaf].Photosynthesis.RUE.FixedValue=1.25
        Cultivar PurcellMG6
          Command:
            [Phenology].Vegetative.Target.FixedValue = 390
            [Phenology].EarlyFlowering.Target.FixedValue = 100
            [Phenology].EarlyGrainFilling.Target.FractionofGrainfilling.FixedValue = 0.056
            [Phenology].LateGrainFilling.Target.EntireGrainfillPeriod.FixedValue = 580
            [Phenology].VegetativePhotoperiodModifier.XYPairs.X = 12.7, 16.05
            [Phenology].ReproductivePhotoperiodModifier.XYPairs.X = 12.7, 16.05
            [Leaf].AreaLargestLeaf.FixedValue=0.007
            [Leaf].Photosynthesis.RUE.FixedValue=1.25
    Report: EventNames=[Clock].DoReport
      VariableNames:
        [Clock].Today
        [Clock].Today.DayOfYear
        [Clock].Today.DayOfWeek
        [Soybean].DaysAfterSowing
        [Soybean].Phenology.CurrentStageName
        [Soybean].Leaf.Photosynthesis.FW
        [Soybean].Leaf.Photosynthesis.FT
        [Soybean].Leaf.Photosynthesis.FN
        [Soybean].Leaf.Photosynthesis.FW.XValue as Supply_Demand_Ratio
        sum of [Soybean].Phenology.ThermalTime from [Soybean].Sowing to [Clock].EndOfYear as CummThermalTime
        sum of [Soybean].Phenology.ThermalTime from 01-Apr to [Clock].EndOfYear as CummThermalTime_fromApril
        //Crop variables
        [Soybean].AboveGround.Wt * 10 as Biomass_kgha
        [Soybean].Grain.Wt * 10 as Yield_kgha
        [Soybean].Leaf.LAI
        //Weather variables
        [Weather].MaxT
        [Weather].MinT
        [Weather].Rain
        [Weather].Radn
        //inspection plots - water
        sum of [Soil].SoilWater.Runoff from [Soybean].Sowing to [Clock].EndOfYear as CummRunoff
        sum of [Weather].Rain from [Soybean].Sowing to [Clock].EndOfYear as CummRain
        sum of [Soybean].Leaf.Transpiration from [Soybean].Sowing to [Clock].EndOfYear as CummTranspiration
        sum of [Soil].SoilWater.Evaporation from [Soybean].Sowing to [Clock].EndOfYear as CummEvaporation
        sum of ([Soil].SoilWater.Evaporation+[Soybean].Leaf.Transpiration) from [Soybean].Sowing to [Clock].EndOfYear as CummET
        ([Soil].SoilWater.Evaporation+[Soybean].Leaf.Transpiration) as CropET
        [Soybean].Leaf.Transpiration
        [Soybean].Leaf.WaterDemand
        sum of ([Soil].SoilWater.Eo) from [Soybean].Sowing to [Clock].EndOfYear as CummPotentialET
        [Soil].SoilWater.Eo
        sum of ([Soil].SoilWater.Eos) from [Soybean].Sowing to [Clock].EndOfYear as CummPotentialEvaporation
        sum of ([Soybean].Leaf.WaterDemand) from [Soybean].Sowing to [Clock].EndOfYear as CummPotentialTranspiration
        sum of [Soil].SoilWater.Drainage from [Soybean].Sowing to [Clock].EndOfYear as CummDrainage
        sum([Soil].Water.MM[1:10]) - sum([Soil].Physical.DULmm[1:10]) as SoilWaterDeficit
        sum of [Field].Irrigation.IrrigationApplied from [Soybean].Sowing to [Clock].EndOfYear as CummIrrigation
        CummRain + CummIrrigation as RainPlusIrrigation
        sum of [Weather].Rain from 01-Apr to [Clock].EndOfYear as CummRain_fromApril
        //inspection plots - nitrogen
        sum of sum([Soil].Nutrient.DenitrifiedN) from [Soybean].Sowing to [Clock].EndOfYear as CummDenitrif
        sum of sum([Soil].Nutrient.N2Oatm) from [Soybean].Sowing to [Clock].EndOfYear as CummN2O
        sum of [Fertiliser].NitrogenApplied from [Soybean].Sowing to [Clock].EndOfYear as CummNfertilizer
        sum of sum([Soil].Nutrient.MineralisedN + [SurfaceOrganicMatter].SurfaceResidue.Decomposition.MineralisedN) from [Soybean].Sowing to [Clock].EndOfYear as CummSoilNetMineral
        sum of [Soil].SoilWater.LeachNO3 from [Soybean].Sowing to [Clock].EndOfYear as CummNleaching
        sum of (-1 * [Soybean].Root.NUptake) from [Soybean].Sowing to [Clock].EndOfYear as CummNUptake
        // Relative soil water
        // 1: 0-100
        // 2: 100-200
        // 3: 200-300
        // 4: 300-400
        // 5: 400-500
        // 6: 500-600
        // 7: 600-700
        // 8: 700-800
        // 9: 800-900
        // 10: 900-1000
        // 11: 1000-1100
        // 12: 1100-1200
        // 13: 1200-1300
        // 14: 1300-1400
        // 15: 1400-1500
        // 16: 1500-1600
        // 17: 1600-1700
        // 18: 1700-1800
        // 19: 1800-1900
        // 20: 1900-2000
        ([Soil].SoilWater.SW[1]) - ([Soil].Physical.LL15[1]) as sw1
        ([Soil].SoilWater.SW[2]) - ([Soil].Physical.LL15[2]) as sw2
        ([Soil].SoilWater.SW[3]) - ([Soil].Physical.LL15[3]) as sw3
        ([Soil].SoilWater.SW[4]) - ([Soil].Physical.LL15[4]) as sw4
        ([Soil].SoilWater.SW[5]) - ([Soil].Physical.LL15[5]) as sw5
        ([Soil].SoilWater.SW[6]) - ([Soil].Physical.LL15[6]) as sw6
        ([Soil].Physical.SAT[1]) - ([Soil].Physical.LL15[1]) as sat1
        ([Soil].Physical.SAT[2]) - ([Soil].Physical.LL15[2]) as sat2
        ([Soil].Physical.SAT[3]) - ([Soil].Physical.LL15[3]) as sat3
        ([Soil].Physical.SAT[4]) - ([Soil].Physical.LL15[4]) as sat4
        ([Soil].Physical.SAT[5]) - ([Soil].Physical.LL15[5]) as sat5
        ([Soil].Physical.SAT[6]) - ([Soil].Physical.LL15[6]) as sat6
        sw1/sat1 as r1
        sw2/sat2 as r2
        sw3/sat3 as r3
        sw4/sat4 as r4
        sw5/sat5 as r5
        sw6/sat6 as r6
        //sw 6 in or 15 cm
        (r1*2 + r2*1)/3 as rel_sw_6in
        //sw 12 in or 30 cm
        (r1+r2+r3)/3 as rel_sw_12in
        //sw 24 in or 60 cm
        (r1+r2+r3+r4+r5+r6)/6 as rel_sw_24in
        //Soil water holding capacity - shwc
        [Soil].Physical.SoybeanSoil.PAWCmm[1] as swhc1
        [Soil].Physical.SoybeanSoil.PAWCmm[2] as swhc2
        [Soil].Physical.SoybeanSoil.PAWCmm[3] as swhc3
        [Soil].Physical.SoybeanSoil.PAWCmm[4] as swhc4
        [Soil].Physical.SoybeanSoil.PAWCmm[5] as swhc5
        [Soil].Physical.SoybeanSoil.PAWCmm[6] as swhc6
        //swhc 6 in or 15 cm, this is sum, not avg
        (swhc1 + swhc2*0.5)/2.54 as swhc_6in
        //swhc 12 in or 30 cm
        (swhc1+swhc2+swhc3)/2.54 as swhc_12in
        //swhc 24 in or 60 cm
        (swhc1+swhc2+swhc3+swhc4+swhc5+swhc6)/2.54 as swhc_24in
        [MicroClimate].PetTotal
  DataStore
  Simulation
    Clock: Start=1992-01-01; End=1992-12-31
    Summary SummaryFile
    Weather: Latitude=36.0991; Tav=14.5531; Amp=11.5168
      FileName=C:/Users/efelli/Box/_Projects/Scale-Sims/uada-stations/fig-climatechange-phenology/SAREC-Fayetteville.met
    SoilArbitrator Soil Arbitrator
    Zone Field: Area=1; Slope=0; AspectAngle=0; Altitude=50
      Report: EventNames=[Clock].EndOfDay
        VariableNames:
          [Clock].Today
          [Clock].Today.Year
          [Simulation].Name
          //Crop
          max of [Soybean].Grain.Wt * 10 from [Soybean].Sowing to [Soybean].Harvesting as Yield_kgha
          max of [Soybean].AboveGround.Wt * 10 from [Soybean].Sowing to [Soybean].Harvesting as biomass_kgha
          max of [Soybean].LAI from [Soybean].Sowing to [Soybean].Harvesting as Max_LAI
          max of [MicroClimate].CanopyCover from [Soybean].Sowing to [Soybean].Harvesting as Max_CanopyCover
          //Soil
          sum of [Soil].SoilWater.Drainage from [Clock].StartOfYear to [Clock].EndOfYear as WDrainage
          sum of [Soil].SoilWater.Runoff from [Clock].StartOfYear to [Clock].EndOfYear as WRunoff
          sum of [Soil].SoilWater.LeachNO3 from [Clock].StartOfYear to [Clock].EndOfYear as NLeaching
          sum of sum([Soil].Nutrient.DenitrifiedN) from [Clock].StartOfYear to [Clock].EndOfYear as NDenitrified
          mean([Soil].Physical.BD[1:3] as BD_0_30cm
          mean([Soil].Physical.SAT[1:3] as SAT_0_30cm
          mean([Soil].Physical.DUL[1:3] as DUL_0_30cm
          mean([Soil].Physical.LL15[1:3] as LL15_0_30cm
          mean([Soil].Physical.ParticleSizeClay[1:3] as Clay_0_30cm
          mean([Soil].Physical.ParticleSizeSand[1:3] as Sand_0_30cm
          mean([Soil].Physical.ParticleSizeSilt[1:3] as Silt_0_30cm
          mean([Soil].Organic.Carbon[1:3] as SOC_0_30cm
          //Weather
          sum of [Weather].Rain from [Clock].StartOfYear to [Clock].EndOfYear as AnnualRain
          sum of [Weather].Radn from [Clock].StartOfYear to [Clock].EndOfYear as AnnualRadn
          mean of [Weather].MaxT from [Clock].StartOfYear to [Clock].EndOfYear as AnnualMaxt
          mean of [Weather].MinT from [Clock].StartOfYear to [Clock].EndOfYear as AnnualMint
          mean of [Weather].MeanT from [Clock].StartOfYear to [Clock].EndOfYear as AnnualMeanT
          //april to sept covers most of the season across the state
          sum of [Weather].Rain from April-15 to Oct-15 as SeasonRain
          sum of [Weather].Radn from April-15 to Oct-15 as SeasonRadn
          mean of [Weather].MaxT from April-15 to Oct-15 as SeasonMaxt
          mean of [Weather].MinT from April-15 to Oct-15 as SeasonMint
          mean of [Weather].MeanT from April-15 to Oct-15 as SeasonMeanT
          //dry April and good stands, and rainfall/moderate temps during grain fill (June/early July), indicates a good season
          //april and early may covers most of planting season
          sum of [Weather].Rain from April-15 to May-31 as SowingSeasonRain
          sum of [Weather].Radn from April-15 to May-31 as SowingSeasonRadn
          mean of [Weather].MaxT from April-15 to May-31 as SowingSeasonMaxt
          mean of [Weather].MinT from April-15 to May-31 as SowingSeasonMint
          mean of [Weather].MeanT from April-15 to May-31 as SowingSeasonMeanT
          //jun and early july covers most of blooming/pod setting range
          sum of [Weather].Rain from Jun-1 to Jul-31 as BloomingSeasonRain
          sum of [Weather].Radn from Jun-1 to Jul-31  as BloomingSeasonRadn
          mean of [Weather].MaxT from Jun-1 to Jul-31  as BloomingSeasonMaxt
          mean of [Weather].MinT from Jun-1 to Jul-31  as BloomingSeasonMint
          mean of [Weather].MeanT from Jun-1 to Jul-31 as BloomingSeasonMeanT
          sum of [Weather].Rain from Jun-1 to Jun-30 as JuneRain
          sum of [Weather].Radn from Jun-1 to Jun-30 as JuneRadn
          mean of [Weather].MaxT from Jun-1 to Jun-30 as JuneMaxt
          mean of [Weather].MinT from Jun-1 to Jun-30 as JuneMint
          mean of [Weather].MeanT from Jun-1 to Jun-30 as JuneMeanT
          sum of [Weather].Rain from Jul-1 to Jul-31 as JulyRain
          sum of [Weather].Radn from Jul-1 to Jul-31 as JulyRadn
          mean of [Weather].MaxT from Jul-1 to Jul-31 as JulyMaxt
          mean of [Weather].MinT from Jul-1 to Jul-31 as JulyMint
          mean of [Weather].MeanT from Jul-1 to Jul-31 as JulyMeanT
          //System
          sum of ([Soil].SoilWater.Evaporation+[Soybean].Leaf.Transpiration) from [Soybean].Sowing to [Soybean].Harvesting as Crop_ET
          sum of [Soil].SoilWater.Eo from [Soybean].Sowing to [Soybean].Harvesting as Potential_Crop_ET
          mean of [Soybean].Leaf.Photosynthesis.FW.XValue from Jun-1 to Jul-15 as Silking_Supply_Demand_Ratio
      Fertiliser
      SurfaceOrganicMatter: InitialResidueName=maize; InitialResidueType=maize; InitialResidueMass=1000; InitialStandingFraction=0.2; InitialCPR=0; InitialCNR=55
      Plant Maize
      Plant Soybean
      MicroClimate: a_interception=0; b_interception=1; c_interception=0; d_interception=0; SoilHeatFluxFraction=0.4; MinimumHeightDiffForNewLayer=0; NightInterceptionFraction=0.5; ReferenceHeight=2
      Manager HarvestSoybean
        Crop = [Soybean]
        TerminationDate = 20-Oct
```csharp
using APSIM.Shared.Utilities;
using Models.Utilities;
using Models.Soils;
using Models.PMF;
using Models.Core;
using System;

namespace Models
{
    [Serializable] 
    public class Script : Model
    {
    [Link] Clock Clock;
    
        [Description("Crop")]
        public IPlant Crop { get; set; }
        
        [Description("If the crop is still alive\nterminate by (d-mmm)")]
        public string TerminationDate { get; set; }
        
        [EventSubscribe("DoManagement")]
        private void OnDoManagement(object sender, EventArgs e)
        {
            if (Crop.IsReadyForHarvesting)
            {
                Crop.Harvest();
                Crop.EndCrop();
            }
            
            if (DateUtilities.WithinDates(TerminationDate, Clock.Today, TerminationDate) && Crop.IsAlive)
            {
                Crop.Harvest();
                Crop.EndCrop();  
            }
            
            
        }
    }
}
```
      Soil Roxana:565431: SoilType=Roxana:565431; State=AR; Country=USA; ApsoilNumber=0; Latitude=35.37776; Longitude=-94.23258
        DataSource=R package apsimx function ssurgo2sp. Timestamp 2023-11-29 13:24:20
        Comments=cokey = 24552301 - acres percent = 90 - component percent = 90 - taxonomic classification name = Coarse-silty, mixed, superactive, nonacid, thermic Typic Udifluvents - drainage class = Well drained - elevation = 28 - slope = 0.5 - geomdesc = NA
        Water: Thickness=[150, 150, 150, 150, 200, 200, 200, 200, 300, 300]; InitialPAWmm=340.321; RelativeTo=LL15; FilledFromTop=false
          InitialValues=[0.243, 0.26, 0.293, 0.3, 0.278, 0.261, 0.248, 0.223, 0.216, 0.205]
        Physical
          Thickness  ParticleSizeSand  ParticleSizeSilt  ParticleSizeClay  Rocks  BD       AirDry     LL15       DUL        SAT       KS
          100        13.9              70.1              16                0      1.59734  0.0511074  0.102215   0.295926   0.397231  777.6
          100        13.9              70.1              16                0      1.59734  0.0511074  0.102215   0.295926   0.397231  777.6
          100        13.9              70.1              16                0      1.59734  0.0511074  0.102215   0.295926   0.397231  777.6
          100        13.9              70.1              16                0      1.59734  0.0511074  0.102215   0.295926   0.397231  777.6
          100        13.9              70.1              16                0      1.59734  0.0511074  0.102215   0.295926   0.397231  777.6
          100        13.9              70.1              16                0      1.59734  0.0511074  0.102215   0.295926   0.397231  777.6
          100        62.7              23.3              14                0      1.63381  0.0828089  0.0828089  0.171507   0.383466  777.6
          100        62.7              23.3              14                0      1.63381  0.0828089  0.0828089  0.171507   0.383466  777.6
          100        62.7              23.3              14                0      1.63381  0.0828089  0.0828089  0.171507   0.383466  777.6
          100        62.7              23.3              14                0      1.63381  0.0828089  0.0828089  0.171507   0.383466  777.6
          100        62.7              23.3              14                0      1.63381  0.0828089  0.0828089  0.171507   0.383466  777.6
          100        62.7              23.3              14                0      1.63381  0.0828089  0.0828089  0.171507   0.383466  777.6
          100        62.7              23.3              14                0      1.63381  0.0828089  0.0828089  0.171507   0.383466  777.6
          100        62.7              23.3              14                0      1.63381  0.0828089  0.0828089  0.171507   0.383466  777.6
          100        87.5              4.5               8                 0      1.59201  0.0413384  0.0413384  0.0849297  0.39924   777.6
          100        87.5              4.5               8                 0      1.59201  0.0413384  0.0413384  0.0849297  0.39924   777.6
          100        87.5              4.5               8                 0      1.59201  0.0413384  0.0413384  0.0849297  0.39924   777.6
          100        87.5              4.5               8                 0      1.59201  0.0413384  0.0413384  0.0849297  0.39924   777.6
          100        87.5              4.5               8                 0      1.59201  0.0413384  0.0413384  0.0849297  0.39924   777.6
          100        87.5              4.5               8                 0      1.59201  0.0413384  0.0413384  0.0849297  0.39924   777.6
          Rocks source: Calculated
          SoilCrop SoybeanSoil
            LL=[0.15, 0.12281, 0.100548, 0.0823217, 0.0673993, 0.0551819, 0.0828089, 0.0828089, 0.0828089, 0.0828089, 0.0828089, 0.0828089, 0.0828089, 0.0828089, 0.0413384, 0.0413384, 0.0413384, 0.0413384, 0.0413384, 0.0413384]
            KL=[0.08, 0.08, 0.08, 0.08, 0.07, 0.07, 0.07, 0.07, 0.06, 0.06, 0.06, 0.06, 0.05, 0.05, 0.04, 0.04, 0.03, 0.03, 0.02, 0.02]
            XF=[1, 1, 1, 1, 1, 1, 1, 1, 1, 1, 1, 1, 1, 1, 1, 1, 1, 1, 1, 1]
          SoilCrop MaizeSoil
            LL=[0.15, 0.12281, 0.100548, 0.0823217, 0.0673993, 0.0551819, 0.0828089, 0.0828089, 0.0828089, 0.0828089, 0.0828089, 0.0828089, 0.0828089, 0.0828089, 0.0413384, 0.0413384, 0.0413384, 0.0413384, 0.0413384, 0.0413384]
            KL=[0.06, 0.0491238, 0.0402192, 0.0329287, 0.0269597, 0.0220728, 0.0180717, 0.0147958, 0.0121138, 0.00991793, 0.00812012, 0.00664819, 0.00544308, 0.00445641, 0.0036486, 0.00298722, 0.00244573, 0.0020024, 0.00163942, 0.00134225]
            XF=[1, 1, 1, 1, 1, 1, 1, 1, 1, 1, 1, 1, 1, 1, 1, 1, 1, 1, 1, 1]
          SoilCrop WheatSoil: same as Simulation.Field.Roxana:565431.Physical.MaizeSoil
        WaterBalance SoilWater: SummerDate=1-may; SummerU=5; SummerCona=3; WinterDate=15-Sep; WinterU=3; WinterCona=3; DiffusConst=40; DiffusSlope=16; Salb=0.13; CN2Bare=73; CNRed=20; CNCov=0; DischargeWidth=5; CatchmentArea=10; PSIDul=-100; Thickness=[150, 150, 150, 150, 200, 200, 200, 200, 300, 300]
          SWCON=[0.422, 0.427, 0.422, 0.404, 0.351, 0.36, 0.365, 0.367, 0.311, 0.314]
        Organic: FOMCNRatio=40; CarbonUnits=Total
          Thickness  Carbon    SoilCNRatio  FBiom        FInert    FOM
          100        0.726744  12           0.04         0.8       150
          100        0.726744  12           0.0327492    0.80804   122.81
          100        0.726744  12           0.0268128    0.816161  100.548
          100        0.726744  12           0.0219525    0.824364  82.3217
          100        0.726744  12           0.0179732    0.832649  67.3993
          100        0.726744  12           0.0147152    0.841017  55.1819
          100        0.436047  12           0.0120478    0.849469  45.1791
          100        0.436047  12           0.00986388   0.858007  36.9895
          100        0.436047  12           0.00807586   0.86663   30.2845
          100        0.436047  12           0.00661196   0.875339  24.7948
          100        0.436047  12           0.00541341   0.884137  20.3003
          100        0.436047  12           0.00443213   0.893022  16.6205
          100        0.436047  12           0.00362872   0.901997  13.6077
          100        0.436047  12           0.00297094   0.911063  11.141
          100        0.436047  12           0.0024324    0.920219  9.12151
          100        0.436047  12           0.00199148   0.929467  7.46806
          100        0.436047  12           0.00163049   0.938809  6.11433
          100        0.436047  12           0.00133493   0.948244  5.00599
          100        0.436047  12           0.00109295   0.957774  4.09856
          100        0.436047  12           0.000894831  0.9674    3.35562
        Chemical: PHUnits=Water
          Thickness=[100, 100, 100, 100, 100, 100, 100, 100, 100, 100, 100, 100, 100, 100, 100, 100, 100, 100, 100, 100]
          PH=[7.3, 7.3, 7.3, 7.3, 7.3, 7.3, 7.5, 7.5, 7.5, 7.5, 7.5, 7.5, 7.5, 7.5, 7.5, 7.5, 7.5, 7.5, 7.5, 7.5]
        Nutrient
        Solute NO3: InitialValues=[0, 0, 0, 0, 0, 0, 0, 0, 0, 0]; InitialValuesUnits=ppm; WaterTableConcentration=0; D0=0; DepthConstant=0; MaxDepthSoluteAccessible=0; RunoffEffectivenessAtMovingSolute=0; MaxEffectiveRunoff=0
          Thickness=[100, 100, 100, 100, 100, 100, 100, 100, 100, 100, 100, 100, 100, 100, 100, 100, 100, 100, 100, 100]
        Solute NH4: Thickness=[150, 150, 150, 150, 200, 200, 200, 200, 300, 300]; InitialValues=[0, 0, 0, 0, 0, 0, 0, 0, 0, 0]; InitialValuesUnits=ppm; WaterTableConcentration=0; D0=0; DepthConstant=0; MaxDepthSoluteAccessible=0; RunoffEffectivenessAtMovingSolute=0; MaxEffectiveRunoff=0
        Solute Urea: Thickness=[150, 150, 150, 150, 200, 200, 200, 200, 300, 300]; InitialValues=[0, 0, 0, 0, 0, 0, 0, 0, 0, 0]; InitialValuesUnits=kg/ha; WaterTableConcentration=0; D0=0; DepthConstant=0; MaxDepthSoluteAccessible=0; RunoffEffectivenessAtMovingSolute=0; MaxEffectiveRunoff=0
        SoilTemperature CERESSoilTemperature
      Manager SowSoybean
        Crop = [Soybean]
        SowDate = 15-Apr
        CultivarName = PurcellMG5
        SowingDepth = 50
        RowSpacing = 750
        Population = 30
```csharp
using APSIM.Shared.Utilities;
using Models.Utilities;
using Models.Soils;
using Models.PMF;
using Models.Core;
using System;
using System.Linq;

namespace Models
{
    [Serializable]
    public class Script : Model
    {
        [Link] Clock Clock;
        [Link] Fertiliser Fertiliser;
        [Link] Summary Summary;
        [Link] Soil Soil;
        
        [Description("Crop")]
        public IPlant Crop { get; set; }

        [Description("Sowing date (d-mmm)")]
        public string SowDate { get; set; }

        [Display(Type = DisplayType.CultivarName)]
        [Description("Cultivar to be sown")]
        public string CultivarName { get; set; }

        [Description("Sowing depth (mm)")]
        public double SowingDepth { get; set; }

        [Description("Row spacing (mm)")]
        public double RowSpacing { get; set; }

        [Description("Plant population (/m2)")]
        public double Population { get; set; }

        [EventSubscribe("DoManagement")]
        private void OnDoManagement(object sender, EventArgs e)
        {
            if (DateUtilities.WithinDates(SowDate, Clock.Today, SowDate))
            {
                Crop.Sow(population: Population, cultivar: CultivarName, depth: SowingDepth, rowSpacing: RowSpacing);    
            }
        }
    }
}
```
      Manager Harvest by min temp
        Crop = [Soybean]
        Threshold = -2
        Days = 5
```csharp
using Models.Soils;
using System.Collections.Generic;
using System.Linq;
using System;
using Models.Core;
using Models.PMF;
using Models.Climate;
using Models.Utilities;
using APSIM.Shared.Utilities;

namespace Models
{
    [Serializable] 
    public class Script : Model
    {
        [Link] Weather weather;
        
        private List<double> accumulatedMinT = new List<double>();
        
        [Separator("Ends the crop and harvests if MinT drops below a threshold, or if the crop is ready for harvesting.")]
        [Description("Crop")]
        public IPlant Crop { get; set; }
        
        [Description("Mean minimum temperature theshold to force harvesting by (oC).")]
        public double Threshold { get; set; }
        
        [Description("Days to take mean MinT over: ")]
        public int Days { get; set; }
        
        
        [EventSubscribe("DoManagement")]
        private void OnDoManagement(object sender, EventArgs e)
        {
            accumulatedMinT.Add(weather.MinT);
            if (accumulatedMinT.Count > Days)
                accumulatedMinT.RemoveAt(0);

            if (Crop.IsReadyForHarvesting || 
                accumulatedMinT.Average() < Threshold && Crop.IsAlive)
            {
                Crop.Harvest();
                Crop.EndCrop();
            }
        }
    }
}
```
      Manager Reset on date
        ResetDate = 1-Jan
        ResetWater = Yes
        ResetNutrients = Yes
        ResetSOM = Yes
```csharp
using Models.Soils.Nutrients;
using APSIM.Shared.Utilities;
using Models.Surface;
using Models.Utilities;
using Models.Soils.Nutrients;
using Models.Soils;
using Models.PMF;
using Models.Core;
using System;
using Models.Interfaces;

namespace Models
{
    [Serializable]
    public class Script : Model
    {
        [Link] private Clock Clock;
        [Link] private Plant Wheat;
        [Link] private ISoilWater SoilWater;
        [Link] private Nutrient nutrient;
        [Link] private SurfaceOrganicMatter SOM;
        [Link] private Summary Summary;

        [Description("Date to reset on:")]
        public string ResetDate {get;set;}

        [Description("Reset Water? (Yes or No)")]
        public string ResetWater {get;set;}

        [Description("Reset Soil Nutrients ? (Yes or No)")]
        public string ResetNutrients {get;set;}

        [Description("Reset Surface Organic Matter? (Yes or No)")]
        public string ResetSOM {get;set;}

        [EventSubscribe("DoManagement")]
        private void OnDoManagement(object sender, EventArgs e)
        {
            if (DateUtilities.WithinDates(ResetDate, Clock.Today, ResetDate))
            {
                if (ResetWater == "Yes")
                {
                    Summary.WriteMessage(this, "Reset Water", MessageType.Diagnostic);
                    SoilWater.Reset();
                }
                if (ResetNutrients == "Yes")
                {
                    Summary.WriteMessage(this, "Reset Nitrogen", MessageType.Diagnostic);
                    nutrient.Reset();
                }
                if (ResetSOM == "Yes")
                {
                    Summary.WriteMessage(this, "Reset Surface OM", MessageType.Diagnostic);
                    SOM.Reset();
                }
            }
        }
    }
}
```
      Irrigation
      Manager ClimateController
        AllowControl = False
        EnableDate = 01/01/1990 00:00:00
        WithinYearControl = False
        ControlStart = 1-jan
        ControlEnd = 31-dec
        RainfallMultiplier = 1
        RainfallAddition = 0
        RadiationMultiplier = 1
        RadiationAddition = 0
        MinTMultiplier = 1
        MinTAddition = 2
        MaxTMultiplier = 1
        MaxTAddition = 2
        WindMultiplier = 1
        WindAddition = 0
        VPMultiplier = 1
        VPAddition = 0
```csharp
using Newtonsoft.Json;
using APSIM.Shared.Utilities;
using Models.Interfaces;
using Models.Soils;
using Models.PMF;
using Models.Core;
using System.Xml.Serialization;
using System;
using System.Linq;
using Models.Soils.Nutrients;
using Models.Climate;

namespace Models
{
    [Serializable]
    public class Script : Model
    {
        // - Links to APSIM models
        [Link] Zone zone;
        [Link] Clock clock;
        [Link] Weather weather;
        [Link] ISummary summary = null;

        // - Paramters for this manager
        [Description("Enable? Set to 'No' to completely disable this manager")] public bool AllowControl { get; set; }

        [Separator("General settings")]
        [Description("Start the climate controls beginning on date (dd/mmm/yyyy): ")] public DateTime EnableDate { get; set; }
        [Description("Implement climate control only during part of the year?")] public bool WithinYearControl { get; set; }
        [Description("Within each year, the first day to start the climate controls is (dd-mmm)")] public string ControlStart { get; set; }
        [Description("Within each year, end last day of climate control is (dd-mmm)")] public string ControlEnd { get; set; }

        [Separator("Rainfall")]
        [Description("Rainfall multiplier (-): ")] public double RainfallMultiplier { get; set; }
        [Description("Rainfall addition (mm): ")] public double RainfallAddition { get; set; }

        [Separator("Radiation")]
        [Description("Radiation multiplier (-): ")] public double RadiationMultiplier { get; set; }
        [Description("Radiation addition (MJ/m2): ")] public double RadiationAddition { get; set; }

        [Separator("Minimum temperature")]
        [Description("Minimum temperature multiplier (-): ")] public double MinTMultiplier { get; set; }
        [Description("Minimum temperature addition (C): ")] public double MinTAddition { get; set; }

        [Separator("Maximum temperature")]
        [Description("Maximum temperature multiplier (-): ")] public double MaxTMultiplier { get; set; }
        [Description("Maximum temperature addition (C): ")] public double MaxTAddition { get; set; }

        [Separator("Wind speed")]
        [Description("Wind speed multiplier (-): ")] public double WindMultiplier { get; set; }
        [Description("Wind speed addition (m/s): ")] public double WindAddition { get; set; }

        [Separator("Vapour pressure")]
        [Description("Vapour pressure multiplier (-): ")] public double VPMultiplier { get; set; }
        [Description("Vapour pressure addition (hPa): ")] public double VPAddition { get; set; }

        [JsonIgnore] public bool DoControl { get; set; }
        [JsonIgnore] public int DoControlInt { get; set; }

        [EventSubscribe("PreparingNewWeatherData")] private void OnDoManagement(object sender, EventArgs e)
        {
            // Check if this manager is enabled
            if ((AllowControl) && (clock.Today >= EnableDate))
            {
                DoControl = true;
                if (WithinYearControl)
                    DoControl = DateUtilities.WithinDates(ControlStart, clock.Today, ControlEnd); 
            }

            if (DoControl)
                DoControlInt = 1;
            else
                DoControlInt = 0;

            if (DoControl)
            {
                // do the weather alterations 
                weather.Rain = RainfallMultiplier * weather.Rain + RainfallAddition;
                weather.Radn = RadiationMultiplier * weather.Radn + RadiationAddition;
                weather.MinT = MinTMultiplier * weather.MinT + MinTAddition;
                weather.MaxT = MaxTMultiplier * weather.MaxT + MaxTAddition;
                weather.Wind = WindMultiplier * weather.Wind + WindAddition;
                weather.VP = VPMultiplier * weather.VP + VPAddition;
            }
        }
    }
}
```
      Manager irrigationscript
        Crop = [Soybean]
        AutoIrrigationOn = True
        FASWThreshold = 0.9
        FASWDepth = 600
        weeks = 0
        afterSowing = 0
```csharp
using Models.Interfaces;
using System;
using System.Linq;
using Models.Core;
using System.Collections.Generic;
using System.Text;
using Models.Soils;
using Models.PMF;
using Models;
using System.Xml.Serialization;
using APSIM.Shared.Utilities;
using Models.Interfaces;
namespace Models
{
    [Serializable] 
    public class Script : Model
    {
        [Link] private Zone zone;
        [Link] private Irrigation irrigation;
        [Link] private ISoilWater waterBalance;
        [Link] private IPhysical soilPhysical;
        public double FASW { get; set; }
        public double WaterDeficit  { get; set; }
    


        [Description("Crop to irrigate")]
        public IPlant Crop { get; set; }
        
        [Description("Auto irrigation on?")]
        public bool AutoIrrigationOn { get; set; }

        [Description("Threshold fraction available water (0-1)")]
        public double FASWThreshold { get; set; }

        [Description("Soil depth (mm) to which fraction available water is calculated")]
        public double FASWDepth { get; set; }

        [Description("Minimum weeks between irrigations")]
        public double weeks { get; set; }

        [Description("Minimum days after sowing for first irrigation")]
        public int afterSowing { get; set; }

        private double irrigationGap = 0;    // gap between irrigations

        /// <summary>Called at start of simulation. Performs some basic error checking. </summary>
        [EventSubscribe("StartOfSimulation")]
        private void ErrorChecking(object sender, EventArgs args)
        {
            if (Crop == null)
                throw new Exception("No crop was specified in script " + Parent.Name);
        }

        [EventSubscribe("DoManagement")]
        private void OnDoManagement(object sender, EventArgs e)
        {
            if (AutoIrrigationOn && Crop.IsAlive)
            {
                   irrigationGap += 1;                // increment gap between irrigations
                CalculateFASW();                // calc FASW and WaterDeficit
                if ((FASW < FASWThreshold) && (irrigationGap >= weeks * 7))
                {
                    irrigation.Apply(WaterDeficit, depth: 0);
                    irrigationGap = 0;            // reset
                }
            }
            else
            {
                irrigationGap = weeks * 7 - afterSowing - 1;    // allow irrigation a number of days after it becomes alive/sown
            }
        }

        // Calculate the fraction of the potential available sw
        // Calculate the deficit amount from DUL
        private void CalculateFASW()
        {
            double[] LL15 = MathUtilities.Multiply(soilPhysical.LL15, soilPhysical.Thickness);
            double[] DUL = MathUtilities.Multiply(soilPhysical.DUL, soilPhysical.Thickness);
        
            int nlayr = GetLayerIndex(FASWDepth);
            nlayr = Math.Min(nlayr, soilPhysical.Thickness.Length-1);
            double cumdep = MathUtilities.Sum(soilPhysical.Thickness, 0, nlayr, 0.0);    // tricky function that sums up to before nlayr

            double part_layer = MathUtilities.Divide((FASWDepth - cumdep), soilPhysical.Thickness[nlayr], 0.0);

            // note that results may be strange if swdep < ll15
            double avail_sw = (MathUtilities.Sum(waterBalance.SWmm, 0, nlayr, 0.0) + part_layer * waterBalance.SWmm[nlayr])
                            - (MathUtilities.Sum(LL15, 0, nlayr, 0.0) + part_layer * LL15[nlayr]);

            double pot_avail_sw = (MathUtilities.Sum(DUL, 0, nlayr, 0.0) + part_layer * DUL[nlayr])
                                - (MathUtilities.Sum(LL15, 0, nlayr, 0.0) + part_layer * LL15[nlayr]);
            
            FASW = MathUtilities.Divide(avail_sw, pot_avail_sw, 0.0);
            WaterDeficit = MathUtilities.Constrain(pot_avail_sw - avail_sw, 0.0, 100000);
        }

        // Get index of the layer that has this depth in it 
        private int GetLayerIndex(double pointDepth)
        {
            double[] cumThickness = soilPhysical.ThicknessCumulative;
            int layerIdx = 0;
            while ((layerIdx < cumThickness.Length) && (pointDepth > cumThickness[layerIdx]))
            {
                layerIdx += 1;
            }

            return layerIdx;
        }
    }
}
```
      Manager CO2
        CO2 = 350
```csharp
using Newtonsoft.Json;
using APSIM.Shared.Utilities;
using Models.Interfaces;
using Models.Soils;
using Models.PMF;
using Models.Core;
using System.Xml.Serialization;
using System;
using Models.Soils.Nutrients;
using Models.Climate;

namespace Models;

[Serializable]
public class Script : Model
{
    // - Links to APSIM models
    [Link] Zone zone;
    [Link] Clock clock;
    [Link] Weather weather;
    [Link] ISummary summary = null;
  
    [Separator("CO2")]
    [Description("CO2 value:")]
    public double CO2 { get; set; }

    [EventSubscribe("PreparingNewWeatherData")] 
    private void OnDoManagement(object sender, EventArgs e)
    {
        weather.CO2 = CO2;
    }
}
```
      Manager AutomaticIrrigation (disabled)
        allowIrrigation = True
        seasonStart = 1-mar
        seasonEnd = 30-nov
        seasonsAllocation = 1000
        triggerDeficit = 99
        targetDeficit = 100
        returndays = 0
        maximumAmount = 30
        depthPAWC = 600
```csharp
using Newtonsoft.Json;
using APSIM.Shared.Utilities;
using System.Xml.Serialization;
using Models.Soils;
using Models.PMF;
using Models.Core;
using System;
using System.Linq;
using Models.Interfaces;



        
namespace Models
{
    [Serializable] 
    [System.Xml.Serialization.XmlInclude(typeof(Model))]
    public class Script : Model
    {
        [Link] private ISummary summary;
        [Link] private Irrigation Irrigation;
        [Link] private Clock Clock;
        [Link] private Soil Soil;
        [Link(IsOptional = true)] private IPlant existingCrop;
        private DateTime StartDate;
        private DateTime EndDate;
        private double TopDUL;
        private double TopLL;
        private int nLayers;
        [Link]
        private IPhysical soilPhysical;
        [Link]
        private ISoilWater waterBalance;
        //Communication to other modules
       
        //User inputs from properties tab
        [Description("Turn irrigation on?")]
        public bool allowIrrigation { get; set; }
        [Description("Start of irrigation season (dd-MMM)")]
        public string seasonStart { get; set; }
        [Description("End of irrigation season (dd-MMM)")]
        public string seasonEnd { get; set; }
        [Description("Season allocation (mm)")]
        public double seasonsAllocation { get; set; }
        [Description("Deficit to trigger irrigation (% PAWC)")]
        public double triggerDeficit { get; set; }
        [Description("Deficit to stop irrigaton (% PAWC)")]
        public double targetDeficit { get; set; }
        [Description("Minimum days for irrigation to return")]
        public double returndays { get; set; }
        [Description("Maximum irrigation application (mm/day)")]
        public double maximumAmount { get; set; }
        [Description("Depth to calculate PAWC (mm)")]
        public double depthPAWC { get; set; }

        //Class members
        [JsonIgnore] public double TopSWdeficit { get; set; }
        [JsonIgnore] public double TopSWC { get; set; }
        [JsonIgnore] public double DaysSinceIrrigation { get; set; }
        [JsonIgnore] public double AmountToApply { get; set; }
        [JsonIgnore] public double SeasonAppliedAmount { get; set; }
        
        private bool IrrigationIsAllowed { get; set; }
        private bool SeasonIsOpen { get; set; }
        private bool CropIsActive { get; set; }
        private bool IrrigatorIsAvailable { get; set; }
        private bool SoilIsDry { get; set; }

    
        //Calculate static soil variables
        [EventSubscribe("StartOfSimulation")]
        private void OnStartOfSimulation(object sender, EventArgs e)
        {   
            //Set the season dates
            StartDate = DateTime.Parse(seasonStart + "-" + Clock.Today.Year.ToString());
            EndDate = DateTime.Parse(seasonEnd + "-" + Clock.Today.Year.ToString());
            
            //Can we irrigate at all?
            IrrigationIsAllowed = false; 
            if (allowIrrigation)
                IrrigationIsAllowed = true; 

            //Calculate soil water variables
            double depthFromSurface = 0.0;
            double fracLayer = 0.0;
            nLayers = soilPhysical.Thickness.Length;
            for (int layer = 0; layer < nLayers; layer++)
            {
                fracLayer = Math.Min(1.0, (depthPAWC - depthFromSurface) / soilPhysical.Thickness[layer]);
                TopLL += soilPhysical.LL15mm[layer] * fracLayer;
                TopDUL += soilPhysical.DULmm[layer] * fracLayer;
                depthFromSurface += soilPhysical.Thickness[layer];
                if (depthFromSurface >= depthPAWC)
                    layer = nLayers;
            }
        }
             
        //Determine daily requirement for irrigation
        [EventSubscribe("StartOfDay")]
        private void OnStartOfDay(object sender, EventArgs e)
        {
            //Can we irrigate today?          
            SeasonIsOpen = isBetween(Clock.Today, StartDate, EndDate);
            if (!SeasonIsOpen)
                SeasonAppliedAmount = 0;

            //Is there a crop in the ground that needs irrigation?
            CropIsActive = false;
            if ((existingCrop != null) && (existingCrop.IsAlive))
                CropIsActive = true;
            //if ((existingCrop.Phenology.Stage >= 3.0) && (existingCrop.Phenology.Stage < 6.0))
          
            //Is the irrigator available?
            IrrigatorIsAvailable = false;
            DaysSinceIrrigation += 1;
            if (DaysSinceIrrigation >= returndays)
                IrrigatorIsAvailable = true;
          
            //Is the soil dry enough to require irrigation?
            SoilIsDry = false;
            double depthFromSurface = 0.0;
            double fracLayer = 0.0;
            TopSWC = 0.0;
            for (int layer = 0; layer < nLayers; layer++)
            //for (int layer = 0; depthFromSurface < depthPAWC + soilPhysical.Thickness[layer]; layer++)
            {
                fracLayer = Math.Min(1.0, (depthPAWC - depthFromSurface) / soilPhysical.Thickness[layer]);
                TopSWC += waterBalance.SWmm[layer] * fracLayer;
                depthFromSurface += soilPhysical.Thickness[layer];
                if (depthFromSurface >= depthPAWC)
                    layer = nLayers;
            }
            
            TopSWdeficit = TopSWC - TopDUL;
            if (Math.Max(0.0, -TopSWdeficit) >= (TopDUL - TopLL) * (100 - triggerDeficit) / 100)
                SoilIsDry = true;
                
            //Are all the conditions ratifying irrigation
            if (IrrigationIsAllowed && SeasonIsOpen && CropIsActive && IrrigatorIsAvailable && SoilIsDry)
            {
                //Lets bloody well irrigate then!!!!
                AmountToApply = TopDUL * targetDeficit / 100 - TopSWC;
                AmountToApply = Math.Max(0.0, Math.Min(AmountToApply, seasonsAllocation - SeasonAppliedAmount));
                AmountToApply = Math.Min(AmountToApply,maximumAmount);
                Irrigation.Apply(AmountToApply);
                DaysSinceIrrigation = 0;
                SeasonAppliedAmount += AmountToApply;
            }
        }
        
        ///Checks whether theDate is between iniDate and endDate (non-year specific)
        private bool isBetween(DateTime theDay, DateTime iniDate, DateTime endDate)
        {
            bool result = false;
            if (iniDate.DayOfYear < endDate.DayOfYear)
            {
                // period is within one year, ex: summer in the northern hemisphere
                if ((theDay.DayOfYear >= iniDate.DayOfYear) && (theDay.DayOfYear <= endDate.DayOfYear))
                    result = true;
            }
            else
            {
                // period goes over the end of the year, ex: summer in the southern hemisphere
                if ((theDay.DayOfYear >= iniDate.DayOfYear) || (theDay.DayOfYear <= endDate.DayOfYear))
                    result = true;
            }
            
            return result;
        }
    }
}
```
      Manager Furrow Irrigation (disabled)
        asw_depth = 6
        crit_fr_asw = 2
        IrrigStart = 01-Mar
        IrrigEnd = 30-Oct
```csharp
// Applies irrigation into the second soil layer after a crop has been sown(lateral inflow from furrow into adjacent beds)
// Irrigation is applied on a deficit defined by the number of soil layers (depth) and a deficit value [0-1]
// Water applied uses the Irrigation model and is reported in the summary file.
// Local variable returned and available for reporting is: applied_furrow_irrigation

using Models.Interfaces;
using System;
using System.Linq;
using Models.Core;
using System.Collections.Generic;
using System.Text;
using Models.Soils;
using Models.PMF;
using System.Xml.Serialization;
using APSIM.Shared.Utilities;

namespace Models
{
    [Serializable]
    public class Script : Model
    {
        // Links
        [Link] Clock clock;
        [Link] Irrigation Irrigation;
        [Link] Soil Soil;
        [Link] IPhysical soilPhysical;
        [Link] ISoilWater waterBalance;

        // Fields
        public double SW_now;
        public double CLL_now;
        public double SW_full;

        // Properties
        [Description("Number of soil layers used in calculating SW deficit")]
        public int asw_depth { get; set; } // Change to int for layer count
        [Description("Fraction of ASW below which irrigation is applied (0-1.0)")]
        public double crit_fr_asw { get; set; } // Critical fraction of available soil water before applying irrigation
        [Description("The earliest date irrigation will be applied (dd-MMM)")]
        public string IrrigStart { get; set; } // No irrigation will be applied before this date
        [Description("The latest date irrigation will be applied (dd-MMM)")]
        public string IrrigEnd { get; set; } // No irrigation will be applied after this date

        // Output variables
        public double[] inflow_lat { get; set; }
        public double applied_furrow_irrigation { get; set; }

        // Methods

        // Calculate static soil variables
        [EventSubscribe("StartOfSimulation")]
        private void OnStartOfSimulation(object sender, EventArgs e)
        {
            // Initialize inflow_lat array
            inflow_lat = new double[soilPhysical.DULmm.Length];
        }

        // Determine daily requirement for irrigation
        [EventSubscribe("StartOfDay")]
        private void OnStartOfDay(object sender, EventArgs e)
        {
            // Is today within the irrigation window?
            if (DateUtilities.WithinDates(IrrigStart, clock.Today, IrrigEnd))
            {
                // Calculate soil water variables
                double[] SW_add = new double[soilPhysical.DULmm.Length];
                for (int layer = 0; layer < asw_depth; layer++)
                {
                    SW_now += waterBalance.SWmm[layer];
                    CLL_now += soilPhysical.LL15mm[layer];
                    SW_full += (soilPhysical.DULmm[layer] - soilPhysical.LL15mm[layer]);
                    SW_add[layer] = soilPhysical.DULmm[layer] - waterBalance.SWmm[layer];
                }

                // Is the soil water deficit greater than the critical SW fraction?
                if ((SW_now - CLL_now) <= (SW_full * crit_fr_asw))
                {
                    // Calculate irrigation and apply it
                    for (int layer = 1; layer < asw_depth; layer++)
                    {
                        inflow_lat[layer] = SW_add[layer] + (SW_add[0] / (asw_depth - 1));
                        applied_furrow_irrigation += inflow_lat[layer];
                        Irrigation.Apply(inflow_lat[layer], depth: soilPhysical.Thickness[layer]);
                    }
                }
                else
                {
                    for (int layer = 0; layer < soilPhysical.DULmm.Length; layer++)
                    {
                        inflow_lat[layer] = 0;
                        applied_furrow_irrigation = 0;            
        		    }
                }
			}
		}
	}
}
```
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